# Approach #1 - function of 2 ranges: (ranges cannot have units, function values can)
x0 := -50, -49 .. 50
y0 := -50, -49 .. 50
f(x, y) := (x^2 + y^2)*1 MPa
# [contour plot: f(x0, y0)]
# contour plot:
# [3D plot: f(x0, y0) (MPa)]
# 3d plot:
# approach #2 plot from 3xN matrix - x,y,z in seperate columns:
M := [
    1 m, 1 m, 3 m;
    2 m, 1 m, 4 m;
    3 m, 1 m, 5 m;
    4 m, 1 m, 6 m;
    5 m, 2 m, 1 m;
    6 m, 2 m, 2 m;
    7 m, 2 m, 4 m;
    8 m, 2 m, 6 m;
    9 m, 3 m, 7 m;
    10 m, 3 m, 8 m
]
# contour: (3xN matrix can have units, but must be the same for columns)
# [contour plot: M]
M2 := [
    1, 1, 3 m;
    2, 1, 4 m;
    3, 1, 5 m;
    4, 1, 6 m;
    5, 2, 1 m;
    6, 2, 2 m;
    7, 2, 4 m;
    8, 2, 6 m;
    9, 3, 7 m;
    10, 3, 8 m
]
# 3d (only z column can have units)
# [3D plot: M2]
# #3 from CreateMesh (i think this is what it does underthe hood for approach #1)
xlow := 0
xhigh := 10
ylow := 0
yhigh := 10
xdiv := 100
ydiv := 100
F := CreateMesh(f, xlow, xhigh, ylow, yhigh, xdiv, ydiv) = [
    [
        0, 0, 0, 0, 0, 0, 0, 0, 0, 0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;
        0.10101, 0.10101, 0.10101, 0.10101, 0.10101, 0.10101, 0.10101, 0.10101, 0.10101, 0.10101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;
        0.20202, 0.20202, 0.20202, 0.20202, 0.20202, 0.20202, 0.20202, 0.20202, 0.20202, 0.20202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;
        0.30303, 0.30303, 0.30303, 0.30303, 0.30303, 0.30303, 0.30303, 0.30303, 0.30303, 0.30303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;
        0.40404, 0.40404, 0.40404, 0.40404, 0.40404, 0.40404, 0.40404, 0.40404, 0.40404, 0.40404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;
        0.505051, 0.505051, 0.505051, 0.505051, 0.505051, 0.505051, 0.505051, 0.505051, 0.505051, 0.505051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;
        0.606061, 0.606061, 0.606061, 0.606061, 0.606061, 0.606061, 0.606061, 0.606061, 0.606061, 0.606061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;
        0.707071, 0.707071, 0.707071, 0.707071, 0.707071, 0.707071, 0.707071, 0.707071, 0.707071, 0.707071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;
        0.808081, 0.808081, 0.808081, 0.808081, 0.808081, 0.808081, 0.808081, 0.808081, 0.808081, 0.808081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;
        0.909091, 0.909091, 0.909091, 0.909091, 0.909091, 0.909091, 0.909091, 0.909091, 0.909091, 0.909091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    ];
    [
        0, 0.10101, 0.20202, 0.30303, 0.40404, 0.505051, 0.606061, 0.707071, 0.808081, 0.909091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;
        0, 0.10101, 0.20202, 0.30303, 0.40404, 0.505051, 0.606061, 0.707071, 0.808081, 0.909091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;
        0, 0.10101, 0.20202, 0.30303, 0.40404, 0.505051, 0.606061, 0.707071, 0.808081, 0.909091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;
        0, 0.10101, 0.20202, 0.30303, 0.40404, 0.505051, 0.606061, 0.707071, 0.808081, 0.909091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;
        0, 0.10101, 0.20202, 0.30303, 0.40404, 0.505051, 0.606061, 0.707071, 0.808081, 0.909091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;
        0, 0.10101, 0.20202, 0.30303, 0.40404, 0.505051, 0.606061, 0.707071, 0.808081, 0.909091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;
        0, 0.10101, 0.20202, 0.30303, 0.40404, 0.505051, 0.606061, 0.707071, 0.808081, 0.909091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;
        0, 0.10101, 0.20202, 0.30303, 0.40404, 0.505051, 0.606061, 0.707071, 0.808081, 0.909091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;
        0, 0.10101, 0.20202, 0.30303, 0.40404, 0.505051, 0.606061, 0.707071, 0.808081, 0.909091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;
        0, 0.10101, 0.20202, 0.30303, 0.40404, 0.505051, 0.606061, 0.707071, 0.808081, 0.909091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    ];
    [
        0, 10203, 40812.2, 91827.4, 163249, 255076, 367309, 499949, 652995, 826446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;
        10203, 20406.1, 51015.2, 102030, 173452, 265279, 377512, 510152, 663198, 836649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;
        40812.2, 51015.2, 81624.3, 132640, 204061, 295888, 408122, 540761, 693807, 867258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;
        91827.4, 102030, 132640, 183655, 255076, 346903, 459137, 591776, 744822, 918274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;
        163249, 173452, 204061, 255076, 326497, 418325, 530558, 663198, 816243, 989695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;
        255076, 265279, 295888, 346903, 418325, 510152, 622385, 755025, 908071, 1081522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;
        367309, 377512, 408122, 459137, 530558, 622385, 734619, 867258, 1020304, 1193756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;
        499949, 510152, 540761, 591776, 663198, 755025, 867258, 999898, 1152944, 1326395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;
        652995, 663198, 693807, 744822, 816243, 908071, 1020304, 1152944, 1305989, 1479441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;
        826446, 836649, 867258, 918274, 989695, 1081522, 1193756, 1326395, 1479441, 1652893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    ] Pa
]
# [contour plot: F]
# [3D plot: F]
# approach #4 from NxM matrix (indices as x/y coords)
# units supported if all the same (only applied to the z value)
A := [1, 1, 1, 1, 1; 1, 1, 2, 2, 2; 1, 2, 2, 2, 3; 2, 2, 3, 3, 3; 3, 3, 3, 4, 5]*m^2
# contour
# [contour plot: A (m^2)]
# 3D
# [3D plot: A]
