# BÆREEVNE I STØBESKEL
# _
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# Beregning af støbeskel i henhold til DS/EN 1992-1-1.
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# Normalkraft i støbeskel (tryk pos) [kN]
N_Sd := 0
# Beton
[f_ck; f_ctk] := [list choice]  # options: C12, C16, C20, C25, C30, C35, C40, C45, C50
γ_c := 1.60
γ_ct := 1.87
# Forskydningskraft i støbeskel [kN]
V_Sd := 31.7
# Armering
f_yk := 550  # list choice: Ribbestål B410 = 410, Ribbestål B500 = 500, Ribbestål B550 = 550
γ_s := 1.32
# Lasttype
k := 0.5  # list choice: Statisk last = 1.0, Dynamisk last = 0.5
# Type
[c; μ] := [list choice]  # options: Fortandet, Ru, Jævn, Glat
# Betonareal i støbeskel [mm^2]
A_j := 500*1000
# Armeringsvinkel i støbeskel [°]
α := 90
# Armeringsarealet i støbeskel [mm^2]
A_s := 6.67*113
# Revnefølsomt støbeskel
revne := "Ja"  # list choice: Ja = "Ja", Nej = "Nej"
# Beregninger  _
# Regningsmæssige
# materialeparametre
f_cd := f_ck/γ_c
f_ctd := f_ctk/γ_ct
f_yd := f_yk/γ_s
ν_v := 0.7 - f_ck/200
α := α*deg
f_yd = 416.667
# Normalspænding og
# forskydningsspænding
τ_Sd := 1000*V_Sd/A_j
σ_nd := N_Sd*10^3/A_j
# Armeringsforholdet og
# kohæsionen
σ_nd :=
    if σ_nd < 0.6*f_cd
        σ_nd
    else
        0.6*f_cd
ρ := A_s/A_j
c :=
    if σ_nd < 0
        0
    also if ρ ≤ (0.02*f_cd - σ_nd)/f_yd and revne == "Ja"
        0
    else
        c
# Støbeskellets bæreevne
τ_Rd := (k*c)*f_ctd + μ*(ρ*f_yd*sin(α) + σ_nd) + ρ*f_yd*cos(α)
τ_Rd :=
    if τ_Rd < 0.5*ν_v*f_cd
        τ_Rd
    else
        0.5*ν_v*f_cd
Accept_τ := if(τ_Sd < τ_Rd, "ok", "Utilstrækkeligt bæreevne")
# Resultater  __
# Bæreevne er:
τ_Rd = 0.707044
# i forhold til belastningen:
τ_Sd = 0.0634
# N/mm^2
Accept_τ = "ok"
