# VRIDNING I BETONTVÆRSNIT
# _
# _
# Beregninger af vridning i betontværsnit i henhold til DS/EN 1992-1-1, afsnit 6.3.2.
# _
# Areal [mm2]
A := 2217000  # Styrke [MPa]  Partialk.
# Beton
f_ck := 45
γ_c := 1.5/0.85
# Omkreds [mm]
u := 3501 + 2*250 + 1185 + 1380 + 1204 = 7770
# Armering
f_yk := 500
γ_s := 1.15
# Antal bøjletværsnit
n_t := 1
# Antal snit
n := 1
i := 1 .. n
# Bøjlediameter  [mm]
ϕ_t := 16
# Betontrykvinkelen
cotθ := 2
# Vridningsmoment [kNm]
T_Ed[i] := 400
# Dæklag [mm]
c := 75
AS1_unused := 150.49 cm^2 - (136 cm^2 + 62 cm^2)/2 = 5149 mm^2
# Diameter på længdearmering
ϕ := 32
# Beregninger  _
# Beregningsparametre
f_cd := f_ck/γ_c
f_yd := f_yk/γ_s
A_t := n_t*(π/4*ϕ_t^2) = 201.062
ν_t := 0.7*(0.7 - f_ck/200)
# Tværsnitsparamtre
t_ef := max(A/u, 2*(c + ϕ_t + ϕ/2))
t_ef/2 = 142.664
A = 2217000
u = 7770
t_ef = 285.328
A_k := A - 387000
u_k := 3215 + 1061 + 1311 + 1084
A_k = 1830000
u_k = 6671
# Bæreevne og bøjleafstand
T_Rdmax := 2*ν_t*f_cd*t_ef*A_k*10^-6/(cotθ + 1/cotθ)
A_sl[i] := T_Ed[i]*10^6*u_k/(2*A_k*f_yd)*cotθ
n_sl[i] := ceil(A_sl[i]/(π/4*ϕ^2))
s[i] := 2*A_t*A_k*f_yd*cotθ/(T_Ed[i]*10^6)
s_t[i] := min(u/8, s[i]) = [971.25]
k[i] := T_Ed[i]/T_Rdmax = [0.112939]
accept[i] := if(k[i] ≥ 0, "ok", "tværsnit overudnyttet")
# Resultater  _
# Nødvendig længde-  Ikke udnyttet skrå
# armering  [mm2]/antal  betonspænding  _
# Bæreevne [MPa]  Bøjleafstand [mm]_
T_Rdmax = 3541.75
s_t[i] = [971.25]
A_sl[i] = [3353.73]
n_sl[i] = [5]
1 - k[i] = [0.887061]
accept[i] = ["ok"]
