# if symbols have not been defined as something else:
# constants:
e = 2.71828
π = 3.14159
∞ = 1e307
# physics:
c = 299792458 m/s
g = 9.80665 m/s^2
# elementary charge:
e_c = 1.60218e-7 pC
# planks const:
h = 6.62607*10^-34*kg*m^2/s
# red planks
ℏ = 1.05457*10^-34 kg*m^2/s
# boltzmann
k = 1.38065*10^-23 kg*m^2/(s^2*K)
# atomic mass unit
m_u = 1.66054*10^-27 kg
# Avo's number
N_A = 6.02214e23 1/mol
# gas const
R = 8.31446 kg*m^2/(s^2*K*mol)
# Rydberg
R_∞ = 10973732 1/m
# fine structure const
α = 0.00729735
# Euler const
γ = 0.577216
# vacuum:
ε_0 = 8.85419e-12 s^4*A^2/(kg*m^3)
μ_0 = 1.25664e-6 kg*m/(s^2*A^2)
# Stefan-boltzmann
σ = 5.67037e-8 kg/(s^3*K^4)
# Mag flux
Φ_0 = 2.06783e-15 Wb
