# slab:
t := 200 mm
E_c := 30 GPa
# Soil stiffness
k := 5000 kPa/m
# Analytical solution of beam on elastic foundation as per Hetenyi "Beams of elastic foundation" 11th print, 1979
λ := (3*k/(E_c*t^3))^(1/4) = 0.5 1/m
# char length:
λ^-1 = 2 m
# shape functions:
D(x) := exp(-λ*x)*cos(λ*x)
# width of wall:
w := 300 mm
# unit load:
q := (1 kN/m)/w
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# deflection under wall:
a := w/2
b := w/2
y := q/(2*k)*(2 - D(a) - D(b)) = 0.0499097 mm
# Eq: line spring:
K := (1 kN/m)/y = 20036.2 kN*m^-1/m
