# LT91
# 1 Introduction
# ...
# 2 Properties
# Column dimensions
w_c := 1.3 m
l_c := 1.3 m
# Foundation thickness:
t := 1.0 m
Contour := 1/2*([-1, -1; -1, 1; 1, 1; 1, -1; -1, -1]*[w_c, 0; 0, l_c])
# Foundation level:
FUK := 16.5 m
# Cover layer
cov := 45 mm
z := 19.42 m
# Top of column:
h_c := z - (FUK + t) = 1.92 m
# Height of column:
# 2.1 Materials
# Concrete properties:
f_ck := 35 MPa
f_cd := f_ck/1.5 = 23.3333 MPa
E_c := 30 GPa
# Strain limits
ε_c2 := -2*10^-3
ε_cu := -3.5*10^-3
# Steel properties:
f_yk := 500 MPa
f_yd := f_yk/1.15
E_s := 200 GPa
α := E_s/E_c = 6.66667
# Strain limits
ε_yd := f_yd/E_s = 0.00217391
ε_ud := 9%
# Stress-strain functions:
σ_c(e) :=
    if e > 0
        0 MPa
    else if e > ε_c2
        -f_cd*(1 - (1 - e/ε_c2)^2)
    else
        -f_cd
σ_s(e) := min(f_yd, max(-f_yd, E_s*e))
# 2.1 Reinforcement
# Stirrup:
ø_w := 12 mm
s_w := 400 mm
# Vertical reinforcement:
ø := 20 mm
# Target spacing (used to calcualte number of bars)
s_x := 300 mm
s_y := 300 mm
n_s := [round(l_c/s_x); round(w_c/s_y); round(l_c/s_x); round(w_c/s_y)] - 2 = [2; 2; 2; 2]
stirrup := Contour + [
    cov + ø_w/2, cov + ø_w/2;
    cov + ø_w/2, -cov - ø_w/2;
    -cov - ø_w/2, -cov - ø_w/2;
    -cov - ø_w/2, cov + ø_w/2;
    cov + ø_w/2, cov + ø_w/2
] = [-0.599, -0.599; -0.599, 0.599; 0.599, 0.599; 0.599, -0.599; -0.599, -0.599] m
s := vectorize([l_c - 2*cov - 2*ø_w; w_c - 2*cov - 2*ø_w; l_c - 2*cov - 2*ø_w; w_c - 2*cov - 2*ø_w]*1/(n_s + 1)) = [395.333; 395.333; 395.333; 395.333] mm
[X_s; Y_s; n] :=
    j ← 0
    for i ∈ 0 .. n_s[0]
        X[j] ← -l_c/2 + cov + ø_w + ø/2 + i*s[0]
        Y[j] ← w_c/2 - cov - ø_w - ø/2
        j ← j + 1
    for i ∈ 0 .. n_s[1]
        X[j] ← l_c/2 - cov - ø_w - ø/2
        Y[j] ← w_c/2 - cov - ø_w - s[1]*i - ø/2
        j ← j + 1
    for i ∈ 0 .. n_s[2]
        X[j] ← l_c/2 - cov - ø_w - s[2]*i - ø/2
        Y[j] ← -w_c/2 + cov + ø_w + ø/2
        j ← j + 1
    for i ∈ 0 .. n_s[3]
        X[j] ← -l_c/2 + cov + ø_w + ø/2
        Y[j] ← -w_c/2 + cov + ø_w + s[3]*i + ø/2
        j ← j + 1
    return [X; Y; j]
# Actual spacing on each face:
s = [395.333; 395.333; 395.333; 395.333] mm
# Total number of vertical bars:
n = 12
# 2.3 Gross section properties
# Area:
A_c := w_c*l_c = 1.69 m^2
A_s :=
    for i ∈ 0 .. n - 1
        A[i] ← ø^2*π/4
    return A
# Moment of inertia:
Iy := 1/12*w_c*l_c^3
Ix := 1/12*w_c^3*l_c
# 2.3 Cross section
# The cross section is divided into 10x10 fibers to solve the biaxial problem
# Division:
n_x := 10
n_y := 10
# Size of each fiber:
dy := w_c/n_y = 130 mm
dx := l_c/n_x = 130 mm
A_ci := dx*dy = 0.0169 m^2
[X_c; Y_c] :=
    for i ∈ 0 .. (n_x - 1)
        for j ∈ 0 .. (n_y - 1)
            Y[i + j*n_x] ← -w_c/2 + (j + 0.5)*dy
            X[i + j*n_x] ← -l_c/2 + (i + 0.5)*dx
    return [X; Y]
# [plot: Contour[:, 1] (mm), stirrup[:, 1] (mm), Y_s (mm), Y_c (mm) vs Contour[:, 0] (mm), stirrup[:, 0] (mm), X_s (mm), X_c (mm)]
# Center of each sub-division fiber shown as grey marker:
# 3 Forces
table  # each column defines a variable
    LS | ID | Side | Case | WindDir | Fz (kN) | Fy (kN) | Fx (kN)
    "ULS" | "LT91" | "North" | "After Launching" | "NorthToSouth" | 1819 | 637 | 0
    "ULS" | "LT91" | "South" | "After Launching" | "NorthToSouth" | 1853 | 637 | 0
    "ULS" | "LT91" | "North" | "After Launching" | "SouthToNorth" | 1850 | 637 | 0
    "ULS" | "LT91" | "South" | "After Launching" | "SouthToNorth" | 1822 | 637 | 0
    "ALS" | "LT91" | "North" | "After Launching" | "-" | 2669 | 0 | 0
    "ALS" | "LT91" | "South" | "After Launching" | "-" | 3036 | 0 | 0
    "ULS" | "LT91" | "North" | "During Launching" | "-" | 8041 | 226 | 776
    "ULS" | "LT91" | "South" | "During Launching" | "-" | 8333 | 226 | 805
    "ULS" | "LT91" | "North" | "Park case 2" | "NorthToSouth" | 3945 | 256 | 0
    "ULS" | "LT91" | "South" | "Park case 2" | "NorthToSouth" | 4847 | 256 | 0
    "ULS" | "LT91" | "North" | "Park case 2" | "SouthToNorth" | 4762 | 256 | 0
    "ULS" | "LT91" | "South" | "Park case 2" | "SouthToNorth" | 4030 | 256 | 0
end table
# Weight of column:
G_c := w_c*l_c*h_c*(25 kN/m^3) = 81.12 kN
# 3.1 Second order effects and imperfections
# Effective height (Assumption based on cantilever with elastic rotation stiffness)
l_0 := h_c*3
# Slenderness:
I_c := min(Ix, Iy)
i := sqrt(I_c/A_c) = 0.375278 m
λ := l_0/i = 15.3486
# Limiting Slenderness:
A := 0.7
B := 1.1
C := 0.7
n_0 := max(Fz)/(A_c*f_cd) = 0.211319
λ_lim := 20*A*B*C/sqrt(n_0) = 23.4504
TextBoxScriptableControl(vals(Effects can be neglected!), calcs(calc), PiggybackNode(inputControlInputField(λ < λ_lim)))
# Imperfections:
θ_0 := 1/200
α_m := 1
α_h := min(2/sqrt(h_c*1/m), 1) = 1
θ_i := θ_0*α_h*α_m = 0.005
e_i := θ_i*l_0/2 = 14.4 mm
# Placement tolerance for temporary bearings (assumption):
e_tol := 50 mm
# 3.2 Design forces at base
# Normal force incl self weight: | Bending moment incl imperfections and tolerance
N := -Fz - G_c = [-1900.12; -1934.12; -1931.12; -1903.12; -2750.12; -3117.12; -8122.12; -8414.12; -4026.12; -4928.12; -4843.12; -4111.12] kN
M_x := Fy*h_c - (e_i + e_tol)*N = [1345.41; 1347.6; 1347.4; 1345.6; 177.108; 200.743; 956.985; 975.789; 750.802; 808.891; 803.417; 756.276] kN*m
M_y := Fx*h_c - (e_i + e_tol)*N = [122.368; 124.557; 124.364; 122.561; 177.108; 200.743; 2012.98; 2087.47; 259.282; 317.371; 311.897; 264.756] kN*m
# Shear force:
V_x := Fx
V_y := Fy
# 4 Biaxial problem
# Forces in each bar and concrete fiber as a function of strain and section curvature:
F_si(e, kx, ky) := vectorize(A_s*σ_s(e + kx*X_s + ky*Y_s))
F_ci(e, kx, ky) := vectorize(A_ci*σ_c(e + kx*X_c + ky*Y_c))
# Internal forces in section for given strain parameters:
N_int(e, kx, ky) := sum(F_ci(e, kx, ky)) + sum(F_si(e, kx, ky))
M_x_int(e, kx, ky) := sum(vectorize(F_ci(e, kx, ky)*Y_c)) + sum(vectorize(F_si(e, kx, ky)*Y_s))
M_y_int(e, kx, ky) := sum(vectorize(F_ci(e, kx, ky)*X_c)) + sum(vectorize(F_si(e, kx, ky)*X_s))
# Solve equilibrium to find strain profile:
solve block
    # guess values
    e := N/(A_c*E_c)
    kx := My/(Iy*E_c)
    ky := Mx/(Ix*E_c)
    # constraints
    N_int(e, kx, ky) == N
    M_x_int(e, kx, ky) == -Mx
    M_y_int(e, kx, ky) == -My
    # solver
    solve_strain(N, Mx, My) := find(e, kx, ky)
end solve block
ones(n) :=
    for i ∈ 0 .. n - 1
        A[i] ← 1
    return A
# Concrete corner strains:
ε_c(e, kx, ky) := [1, -l_c/2, -w_c/2; 1, -l_c/2, w_c/2; 1, l_c/2, -w_c/2; 1, l_c/2, w_c/2]*[e; kx; ky]
# Rebar strain:
ε_s(e, kx, ky) := augment(ones(n), X_s, Y_s)*[e; kx; ky]
# Utilization functions:
UR_c(ε_c) := min(ε_c)/ε_cu
UR_s(ε_s) := max(ε_s)/ε_ud
# 4.1 Loop through all load cases
# All load cases are looped through - the equilibrium strain profile is calculated and saved in the E matrix, and the resulting utilizations are found.
# The load cases with maximum tensile and compressive utlizations are saved and shown below
[UR_c_max; i_c; UR_s_max; i_s; ERR; E] :=
    i_c ← -1
    UR_c_max ← 0
    i_s ← -1
    UR_s_max ← 0
    for j ∈ 0 .. length(Case) - 1
        try
            e ← solve_strain(N[j], M_x[j], M_y[j])
            E[j] ← e
            ec ← ε_c(e[0], e[1], e[2])
            es ← ε_s(e[0], e[1], e[2])
            UR_ci ← UR_c(ec)
            UR_si ← UR_s(es)
            if UR_ci > UR_c_max
                UR_c_max ← UR_ci
                i_c ← j
            if UR_si > UR_s_max
                UR_s_max ← UR_si
                i_s ← j
        on error
            return transpose([9.99, j, 9.99, j, 1, E])
    return transpose([UR_c_max, i_c, UR_s_max, i_s, 0, E])
    = [
        0.18899;
        7;
        0.0121345;
        0;
        0;
        [
            [0.000349387; -7.37037e-5 1/m; -0.00120025 1/m];
            [0.000334848; -7.47574e-5 1/m; -0.00117281 1/m];
            [0.000336117; -7.4635e-5 1/m; -0.00117522 1/m];
            [0.000348087; -7.3761e-5 1/m; -0.00119781 1/m];
            [-6.96954e-5; -3.22772e-5 1/m; -3.22772e-5 1/m];
            [-7.91958e-5; -3.67595e-5 1/m; -3.67595e-5 1/m];
            [-0.000211161; -0.000436199 1/m; -0.000220086 1/m];
            [-0.000219691; -0.000454119 1/m; -0.000225535 1/m];
            [-0.000103493; -4.8343e-5 1/m; -0.000139464 1/m];
            [-0.000127528; -5.95654e-5 1/m; -0.000151816 1/m];
            [-0.000125255; -5.84694e-5 1/m; -0.000150612 1/m];
            [-0.000105749; -4.93689e-5 1/m; -0.000140594 1/m]
        ]
    ]
TextBoxScriptableControl(vals(Solved without errors), calcs(calc), PiggybackNode(inputControlInputField(ERR == 0)))
TextBoxScriptableControl(vals(All loadcases pass!), calcs(calc), PiggybackNode(inputControlInputField(max(UR_c_max, UR_s_max) < 1)))
# 4.2 Critical load cases
# 4.2.1 Maximum compression case:
# neural axis (found by solving strain = 0 on each boundary)
# Critical case nr:
j := i_c = 7
Neutral(e, kx, ky) :=
    y ← -e/ky + l_c/2*kx/ky
    j ← 0
    if y ≥ -w_c/2 and y ≤ w_c/2
        Ans[j, 0] ← -l_c/2
        Ans[j, 1] ← y
        j ← j + 1
    y ← -e/ky - l_c/2*kx/ky
    if y > -w_c/2 and y < w_c/2
        Ans[j, 0] ← l_c/2
        Ans[j, 1] ← y
        j ← j + 1
    x ← -e/kx + w_c/2*ky/kx
    if x ≥ -l_c/2 and x ≤ l_c/2
        Ans[j, 0] ← x
        Ans[j, 1] ← -w_c/2
        j ← j + 1
    x ← -e/kx - w_c/2*ky/kx
    if x > -l_c/2 and x < l_c/2
        Ans[j, 0] ← x
        Ans[j, 1] ← w_c/2
        j ← j + 1
    return Ans
# Case info:
LS[j] = "ULS"
ID[j] = "LT91"
Side[j] = "South"
Case[j] = "During Launching"
WindDir[j] = "-"
# Section forces (incl imperfections):
N[j] = -8414.12 kN
M_x[j] = 975.789 kN*m
M_y[j] = 2087.47 kN*m
# Resulting strain parameters:
[e; kx; ky] := E[j] = [-0.000219691; -0.000454119 1/m; -0.000225535 1/m]
NA := Neutral(e, kx, ky) = [-0.65, 0.334699; -0.160957, -0.65] m
# find location of resultants:
t_only(x) := max(0, x)
c_only(x) := min(0, x)
# Concrete strains/stress at corners:
e_c := ε_c(e, kx, ky) = [0.000222084; -7.11113e-5; -0.000368271; -0.000661466]
vectorize(σ_c(e_c)) = [0; -1.62977; -7.80185; -12.8819] MPa
T(e, kx, ky) := sum(vectorize(t_only(F_si(e, kx, ky))))
C(e, kx, ky) := sum(vectorize(c_only(F_ci(e, kx, ky)))) + sum(vectorize(c_only(F_si(e, kx, ky))))
min(vectorize(σ_c(e_c))) = -12.8819 MPa
CG(e, kx, ky) := [
    sum(vectorize(t_only(F_si(e, kx, ky))*X_s))/T(e, kx, ky), sum(vectorize(t_only(F_si(e, kx, ky))*Y_s))/T(e, kx, ky);
    (sum(vectorize(c_only(F_ci(e, kx, ky))*X_c)) + sum(vectorize(c_only(F_si(e, kx, ky))*X_s)))/C(e, kx, ky), (sum(vectorize(c_only(F_ci(e, kx, ky))*Y_c)) + sum(vectorize(c_only(F_si(e, kx, ky))*Y_s)))/C(e, kx, ky)
]
# Strain/stress in rebar:
e_s := ε_s(e, kx, ky) = [-8.64265e-5; -0.000265955; -0.000445483; -0.00061593; -0.000526768; -0.000437607; -0.000352956; -0.000173427; 6.10104e-6; 0.000176547; 8.73857e-5; -1.77574e-6]
vectorize(σ_s(e_s)) = [-17285294; -53190989; -89096683; -123185901; -105353614; -87521327; -70591180; -34685486; 1220209; 35309426; 17477140; -355147] Pa
CGi := CG(e, kx, ky) = [-0.57452, -0.455066; 0.246436, 0.114821] m
max(vectorize(σ_s(e_s))) = 35.3094 MPa
z(e, kx, ky) :=
    X ← CG(e, kx, ky)
    return sqrt((X[1, 0] - X[0, 0])^2 + (X[1, 1] - X[0, 1])^2)
# Utilizations (in terms of strain limits):
UR_c(e_c) = 0.18899
UR_s(e_s) = 0.00196163
# Cross section w/ resulting neutral axis (green dash) and location of Compression/Tension resultants (purple stars, lever arm shown dash between resultants):
A_stx(e, kx, ky) := t_only(F_si(e, kx, ky))/t_only(vectorize(σ_s(ε_s(e, kx, ky))))
z(e, kx, ky) = 999.37 mm
# [plot: Contour[:, 1] (mm), Y_s (mm), NA[:, 1] (mm), CGi[:, 1] (mm) vs Contour[:, 0] (mm), X_s (mm), NA[:, 0] (mm), CGi[:, 0] (mm)]
T(e, kx, ky) = 16.9667 kN
C(e, kx, ky) = -8431.09 kN
A_stx(e, kx, ky) = 0.000314159 m^2
# 4.2.1 Maximum tension case:
# Critical case nr:
j := i_s = 0
# Case info:
LS[j] = "ULS"
ID[j] = "LT91"
Side[j] = "North"
Case[j] = "After Launching"
WindDir[j] = "NorthToSouth"
# Section forces (incl imperfections):
N[j] = -1900.12 kN
M_x[j] = 1345.41 kN*m
M_y[j] = 122.368 kN*m
# Resulting strain parameters:
[e; kx; ky] := E[j] = [0.000349387; -7.37037e-5 1/m; -0.00120025 1/m]
NA := Neutral(e, kx, ky) = [-0.65, 0.331009; 0.65, 0.25118] m
# Concrete strains/stress at corners:
e_c := ε_c(e, kx, ky) = [0.00117746; -0.000382871; 0.00108165; -0.000478686]
vectorize(σ_c(e_c)) = [0; -8.07855; 0; -9.83268] MPa
CGi := CG(e, kx, ky) = [-0.0266414, -0.470693; 0.0501848, 0.524014] m
min(vectorize(σ_c(e_c))) = -9.83268 MPa
# Strain/stress in rebar:
e_s := ε_s(e, kx, ky) = [-0.000307392; -0.00033653; -0.000365667; -0.000393331; 8.11701e-5; 0.000555671; 0.00100617; 0.0010353; 0.00106444; 0.0010921; 0.000617604; 0.000143104]
vectorize(σ_s(e_s)) = [-61478413; -67305920; -73133427; -78666119; 16234014; 111134146; 201233260; 207060767; 212888274; 218420966; 123520833; 28620701] Pa
max(vectorize(σ_s(e_s))) = 218.421 MPa
# Utilizations (in terms of strain limits):
UR_c(e_c) = 0.136767
UR_s(e_s) = 0.0121345
# Cross section w/ resulting neutral axis (green dash) for applied forced and location of Compression/Tension resultants (purple stars, lever arm shown dash between resultants):
z(e, kx, ky) = 997.669 mm
# [plot: Contour[:, 1] (mm), Y_s (mm), NA[:, 1] (mm), CGi[:, 1] (mm) vs Contour[:, 0] (mm), X_s (mm), NA[:, 0] (mm), CGi[:, 0] (mm)]
T(e, kx, ky) = 351.58 kN
C(e, kx, ky) = -2251.7 kN
# 5 Shear verification
# Shear resultant:
V := vectorize(sqrt(V_x^2 + V_y^2)) = [637; 637; 637; 637; 0; 0; 808.24; 836.123; 256; 256; 256; 256] kN
# Effective depth
d := l_c - cov - ø_w - ø/2 = 1233 mm
# Shear width
b_w := w_c
# Number of tensile bars:
n_t := round(w_c/s_y) = 4
# Area of reinforcement in tension
A_st := n_t*ø^2*π/4 = 0.00125664 m^2
# Reinforcement ratio:
ρ := min(0.02, A_st/(b_w*d)) = 0.000783977
# Compression in section:
σ_cp := vectorize(-N/A_c) = [1.12433; 1.14445; 1.14267; 1.12611; 1.62729; 1.84445; 4.80599; 4.97877; 2.38232; 2.91605; 2.86575; 2.43262] MPa
# Size factor:
k := min(2, 1 + sqrt(200 mm/d)) = 1.40275
# Shear strenth parameters:
C_Rdc := (0.18/1.5) MPa
k_1 := 0.15
# Shear resistance:
v_Rdc := C_Rdc*k*(100*ρ*f_ck/MPa)^(1/3) = 0.235659 MPa
v_min := 0.035 MPa*k^(3/2)*(f_ck/MPa)^(1/2) = 0.34401 MPa
# Total design shear resistance:
V_rd := vectorize((max(v_Rdc, v_min) + k_1*σ_cp)*b_w*d) = [821.743; 826.58; 826.153; 822.17; 942.672; 994.885; 1706.94; 1748.48; 1124.21; 1252.53; 1240.44; 1136.3] kN
# Shear utilization
UR_vc := vectorize(V/V_rd) = [0.775182; 0.770645; 0.771043; 0.774779; 0; 0; 0.473502; 0.478198; 0.227716; 0.204386; 0.206378; 0.225293]
max(UR_vc) = 0.775182
TextBoxScriptableControl(vals(OK!), calcs(calc), PiggybackNode(inputControlInputField(max(UR_vc) < 1)))
# 6 Minimum reinforcement
# Minimum reinforcement for column:
A_smin := max(vectorize(0.1*(-N))/f_yd, 0.002*A_c) = 3380 mm^2
# Maximum reinforcement:
A_smax := 0.04*A_c = 67600 mm^2
# Provided vertical reinforcement:
A_s_total := sum(A_s) = 3769.91 mm^2
TextBoxScriptableControl(vals(OK!), calcs(calc), PiggybackNode(inputControlInputField(A_s_total > A_smin and A_s_total < A_smax)))
# Maximum allowed stirrup spacing:
s_max := min(400 mm, 20*ø, l_c, w_c) = 400 mm
TextBoxScriptableControl(vals(OK!), calcs(calc), PiggybackNode(inputControlInputField(s_w ≤ s_max)))
# 7 Bursting at temp bearing
# Bearing size:
l_b := 420 mm
w_b := 490 mm
# LT91 / 92 -> 650ton -> 420x460mm | LT93 ->300t -> 275x330x
# Bearing area
A_0 := l_b*w_b = 205800 mm^2
# Max veritical bearing force:
max(Fz) = 8.333 MN
d_2 := min(3*l_b, l_c) = 1.26 m
b_2 := min(3*w_b, w_c) = 1.3 m
A_1 := d_2*b_2
# Confined concrete strength under bearing:
F_Rdu := A_0*f_cd*min(sqrt(A_1/A_0), 3) = 13.5474 MN
# Bursting tension force:
T_burst := 1/4*(l_c - l_b)/l_c*max(Fz) = 1410.2 kN
# Increased reinforcement near bearing:
ø_b := 16 mm
n_leg := 4
# Steel area per layer:
A_swi := n_leg*ø_b^2*π/4 = 804.248 mm^2
# Height of bursting zone:
h := l_c = 1.3 m
# Min required stirrups spacing:
s_req := h*A_swi*f_yd/T_burst = 322.348 mm
# Provided spacing:
s_b := 300 mm
TextBoxScriptableControl(vals(OK!), calcs(calc), PiggybackNode(inputControlInputField(s_b ≤ s_req)))
