M == C*x_c - T*x_t
N == C + T
T == N - C
M == C*x_c - (N - C)*x_t solve, C → (x_t*N + M)/(x_t + x_c)
N := 115798 kN
M := 23749 kN*m
c := 71 mm
w := 1.2 m
a_c := 500 mm
x_t := w/2 - c = 0.529 m
x_c := w/2 - a_c/2 = 350 mm
C := (x_t*N + M)/(x_t + x_c) = 96707.8 kN
T := N - C = 19090.2 kN
# check:
C*x_c - T*x_t = 23749 kN*m
