# Concrete interface shear check
# Concrete
[f_ck; f_ctk] := [list choice]  # options: C12, C16, C20, C25, C30, C35, C40, C45, C50
γ_c := 1.60
# compression in section [kN]
N_Sd := 0
γ_ct := 1.87
# Shear in casting joint [kN]
V_Sd := 31.7
# Rebar
f_yk := 550  # list choice: B410 = 410, B500 = 500, B550 = 550
γ_s := 1.32
# Load type
k := 0.5  # list choice: Static = 1.0, Dynamic = 0.5
# Type
[c; μ] := [list choice]  # options: Fortandet, Ru, Jævn, Smooth
# Concrete interface area [mm^2]
A_j := 500*1000
# Rebar angle [°]
α := 90
# Rebar crossing interface [mm^2]
A_s := 6.67*113
# Cracking sensitive?
crack := "No"  # list choice: Yes = "Yes", No = "No"
# Design strength
f_cd := f_ck/γ_c
f_ctd := f_ctk/γ_ct
f_yd := f_yk/γ_s
ν_v := 0.7 - f_ck/200
α := α*deg
f_yd = 416.667
# Design stress:
τ_Sd := 1000*V_Sd/A_j
σ_nd := N_Sd*10^3/A_j
# Reinforcement ratio and cohesion:
σ_nd :=
    if σ_nd < 0.6*f_cd
        σ_nd
    else
        0.6*f_cd
ρ := A_s/A_j
c :=
    if σ_nd < 0
        0
    also if ρ ≤ (0.02*f_cd - σ_nd)/f_yd and crack == "Yes"
        0
    else
        c
# Interface capacity:
τ_Rd := (k*c)*f_ctd + μ*(ρ*f_yd*sin(α) + σ_nd) + ρ*f_yd*cos(α)
τ_Rd :=
    if τ_Rd < 0.5*ν_v*f_cd
        τ_Rd
    else
        0.5*ν_v*f_cd
Accept_τ := if(τ_Sd < τ_Rd, "ok", "Not ok!")
τ_Rd = 0.899507  # compared with demand:
τ_Sd = 0.0634  # N/mm^2
Accept_τ = "ok"
