# Torsion in concrete section
# Area [mm2]
A := 2217000
# perimeter [mm]
u := 3501 + 2*250 + 1185 + 1380 + 1204 = 7770
# Number of stirrups
n_t := 1  # Material properties:
# stirrup dia [mm]
ϕ_t := 16
f_ck := 45
γ_c := 1.5/0.85
# shear strut angle
cotθ := 2
# rebar:
f_yk := 500
γ_s := 1.15
# cover layer [mm]
c := 75
# sections
n := 1
i := 1 .. n
# Longitudinal reinforcement dia
ϕ := 32
# Torsion [kNm]
T_Ed[i] := 400
AS1_unused := 150.49 cm^2 - (136 cm^2 + 62 cm^2)/2 = 5149 mm^2
# calculation parameters:
f_cd := f_ck/γ_c
f_yd := f_yk/γ_s
A_t := n_t*(π/4*ϕ_t^2) = 201.062
ν_t := 0.7*(0.7 - f_ck/200)
# cross section:
t_ef := max(A/u, 2*(c + ϕ_t + ϕ/2))
t_ef/2 = 142.664
A = 2217000
u = 7770
t_ef = 285.328
A_k := A - 387000
u_k := 3215 + 1061 + 1311 + 1084
A_k = 1830000
u_k = 6671
# Strength:
T_Rdmax := 2*ν_t*f_cd*t_ef*A_k*10^-6/(cotθ + 1/cotθ)
A_sl[i] := T_Ed[i]*10^6*u_k/(2*A_k*f_yd)*cotθ
n_sl[i] := ceil(A_sl[i]/(π/4*ϕ^2))
s[i] := 2*A_t*A_k*f_yd*cotθ/(T_Ed[i]*10^6)
s_t[i] := min(u/8, s[i]) = [971.25]
k[i] := T_Ed[i]/T_Rdmax = [0.112939]
accept[i] := if(k[i] ≥ 0, "ok", "not ok!")
# Results
T_Rdmax = 3541.75
s_t[i] = [971.25]
A_sl[i] = [3353.73]
n_sl[i] = [5]
1 - k[i] = [0.887061]
accept[i] = ["ok"]
