# Cross section
h := 500 mm
w := 1000 mm
γ_c := 1.0
γ_s := 1.0
# Concrete properties:
f_cd := 45 MPa/γ_c
f_ctm := 2.9 MPa
# creep factor:
ϕ := 0
E_c := 30 GPa
ε_c2 := -0.0020
# Stress-strain function
σ_c(e) :=
    if e < ε_c2
        -f_cd
    else if e < 0
        -f_cd*(1 - (1 - e/ε_c2)^2)
    else
        0 MPa
# Plot:
e_plot := -0.0035, -0.00345 .. 0.001
# [plot: σ_c(e_plot/(1 + ϕ)) (MPa), σ_c(e_plot) (MPa) vs e_plot (10^-3)]
# Steel
# Array of each layer
cov := 75 mm
Ø := [0; 25] mm
z_s := [h/2 - cov - Ø[0]*0.5; -h/2 + cov + Ø[1]*0.5] = [0.175; -0.1625] m
s := [150; 150] mm
n := length(Ø) = 2
A_s := vectorize(Ø^2*π/4*w/s) = [0; 3272.49] mm^2
f_yk := 500 MPa
f_yd := f_yk/γ_s = 500 MPa
E_s := 200 GPa
# steel stress-strain relation:
σ_s(e) := max(min(E_s*e, f_yd), -f_yd)
# Strain function incl creep
ε(z, e, k) := (e + k*z)/(1 + ϕ)
# Stress function
σ(z, e, k) := σ_c(ε(z, e, k))
# Rebar force vector:
F_s(e, k) := vectorize(A_s*σ_s(ε(z_s, e, k)))
# Internal forces:
N_int(e, k) := w*integral(σ(z, e, k), z = -h/2 .. h/2) + sum(F_s(e, k)[i], i = 0 .. n - 1)
M_int(e, k) := w*integral(σ(z, e, k)*z, z = -h/2 .. h/2) + sum(F_s(e, k)[i]*z_s[i], i = 0 .. n - 1)
# Gross section stiffness:
EA_g := w*h*E_c
EI_g := E_c*1/12*h^3*w
# External forces
N_ext := -500 kN
M_ext := -530 kN*m
# Solve to find strain distribution matchin external forces:
solve block
    # guess values
    e := N_ext/EA_g
    k := M_ext/EI_g
    # constraints
    N_int(e, k) == N_ext
    M_int(e, k) == M_ext
    # solver
    [e_1; k_1] := find(e, k) = [0.000783138; -0.00593529 1/m]
end solve block
# check:
N_int(e_1, k_1) = -500 kN
M_int(e_1, k_1) = -530 kN*m
# Plot:
z_plot := -h/2, -h/2 + 1 mm .. h/2
# [plot: z_plot vs σ(z_plot, e_1, k_1) (MPa), ε(z_plot, e_1, k_1) (10^-3)]
# neutral axis:
x := h/2 + e_1/k_1 = 118.054 mm
# Stress in steel:
vectorize(σ_s(ε(z_s, e_1, k_1))) = [-51.1075; 349.525] MPa
