W := 600 mm
H := 800 mm
ε_0 := 0
κ_x := 1*km^-1
κ_y := 3*km^-1
f_cd := 30 MPa
E_c := 33 GPa
f_ctd := 1 MPa
n := 2
ε_c2 := -2/1000
σ(e) :=
    if e > f_ctd/E_c
        f_ctd
    else if e > 0
        E_c*e
    else if e > ε_c2
        -f_cd*(1 - (1 - e/ε_c2)^n)
    else
        -f_cd
e0 := 1.5*ε_c2, 1.49*ε_c2 .. -ε_c2
# [plot: σ(e0) (MPa) vs e0 (10^-3)]
N(ε, κ_x, κ_y) := integral(integral(σ(ε + κ_x*x + κ_y*y), x = -W/2 .. W/2), y = -H/2 .. H/2)
M_x(ε, κ_x, κ_y) := integral(integral(σ(ε + κ_x*x + κ_y*y)*x, x = -W/2 .. W/2), y = -H/2 .. H/2)
M_y(ε, κ_x, κ_y) := integral(integral(σ(ε + κ_x*x + κ_y*y)*y, x = -W/2 .. W/2), y = -H/2 .. H/2)
EA := H*W*E_c
EIx := E_c*1/12*W^3*H
EIy := E_c*1/12*H^3*W
N_Ed := 0 kN
M_xEd := 0 kN*m
M_yEd := 155 kN*m
solve block
    # guess values
    e := N_Ed/EA = 0
    kx := M_xEd/EIx = 0 1/m
    ky := M_yEd/EIy = 0.000183475 1/m
    # constraints
    N(e, kx, ky) == N_Ed
    M_x(e, kx, ky) == M_xEd
    M_y(e, kx, ky) == M_yEd
    # solver
    [ε_0; κ_x; κ_y] := find(e, kx, ky) = [0.000209704; 1.11866e-26 1/m; 0.00103698 1/m]
end solve block
ε(x, y) := ε_0 + κ_x*x + κ_y*y
x0 := -W/(2 mm), -0.495*W/mm .. W/(2 mm)
y0 := -H/(2 mm), -0.495*H/mm .. H/(2 mm)
f(x, y) := σ(ε(x*mm, y*mm))
# [contour plot: f(x0, y0) (MPa)]
