# constant def, cannot be reassigned
G ≡ 10
# factorial
3! = 6
A := 1 m
B := 5 m
# equation breaks
A^2 + B^2 = 26 m^2
B - A = 4 m
A*B = 5 m^2
B/A = 5
# Number sets
3 ∈ ℤ = 1
3.1 ∈ ℤ = 0
3.1 ∈ ℝ = 1
1 + 2i ∈ ℂ = 1
# Rational numbers has to be evaluated symbolically:
π ∈ ℚ → 0
# logic
# XOR:
1 xor 1 = 0
0 xor 1 = 1
# neq:
A ≠ B = 1
# gt, ge, lt, le:
B > A = 1
B ≥ A = 1
B ≤ 5 m = 1
B ≤ A = 0
# and:
1 and 1 = 1
# or:
1 or 0 = 1
# not:
not 0 = 1
not 3 = 0
not 1 = 0
not (-1) = 0
# eq:
3 == 3 = 1
