# Example: Seeded Iteration and Difference Equation
X := 700
guess[0] := 30
N := 8
i := 0 .. N
guess[i + 1] := (guess[i] + X/guess[i])*1/2
guess = [30; 26.6667; 26.4583; 26.4575; 26.4575; 26.4575; 26.4575; 26.4575; 26.4575; 26.4575]
guess[i]^2 - X = [200; 11.1111; 0.0434028; 6.72745e-7; 0; 0; 0; 0; 0]
i_range[i] := i
# [plot: guess vs i_range]
# Systems of Difference Equations
# Define seed values for the simultaneous iteration.
[inf[0]; sus[0]; dec[0]; rec[0]] := [50; 2.2*10^4; 0; 0]
# Define the system of difference equations.
τ := 0 .. 20
τ_range[τ] := τ
[inf[τ + 1]; sus[τ + 1]; dec[τ + 1]; rec[τ + 1]] := [1*10^-4*sus[τ]*inf[τ]; sus[τ] - 1*10^-4*sus[τ]*inf[τ]; dec[τ] + 0.55*inf[τ]; rec[τ] + 0.45*inf[τ]]
# [plot: inf, sus, dec, rec vs τ_range]
# Matrix Difference Equations
v_0 := [10; 25; 15]
A := [0.5, 0, 0.2; 0.25, 0.9, 0.1; 0.25, 0.1, 0.7]
# Define the iteration process.
k := 1 .. 8
k_range[k] := k
[V[0, 0]; V[1, 0]; V[2, 0]] := v_0
[V[0, k]; V[1, k]; V[2, k]] := A*V[:, k - 1]
# Calculate the final state of the vector.
V[:, 8] = [6.01676; 29.1241; 14.8591]
# The matrix V contains the history of the process:
transpose(V) = [
    10, 25, 15;
    8, 26.5, 15.5;
    7.1, 27.4, 15.5;
    6.65, 27.985, 15.365;
    6.398, 28.3855, 15.2165;
    6.2423, 28.6681, 15.0896;
    6.13907, 28.8708, 14.9901;
    6.06756, 29.0175, 14.9149;
    6.01676, 29.1241, 14.8591
]
