v1 := [12.1, 11.8, 12.4, 12.0, 11.9, 12.3, 12.2, 11.7, 12.5, 12.1]
v2 := [11.95, 12.05, 12.35, 11.85, 12.15, 12.25, 11.75, 12.45, 12.6, 13.3]
v := stack(transpose(v1), transpose(v2)) = [12.1; 11.8; 12.4; 12; 11.9; 12.3; 12.2; 11.7; 12.5; 12.1; 11.95; 12.05; 12.35; 11.85; 12.15; 12.25; 11.75; 12.45; 12.6; 13.3]
u2 := [11.95, 12.05, 12.35, 11.85, 12.15, 12.25, 11.75, 12.45, 12.6, 12.0]
u := stack(transpose(v1), transpose(u2)) = [12.1; 11.8; 12.4; 12; 11.9; 12.3; 12.2; 11.7; 12.5; 12.1; 11.95; 12.05; 12.35; 11.85; 12.15; 12.25; 11.75; 12.45; 12.6; 12]
i := 0 .. 19
x[i] := i
Grubbs(v, 0.95) = [19, 3.11318, -0.404932]
Grubbs(v, 0.999) = [19, 3.11318, 0.200598]
GrubbsClassic(v, 0.95) = [19, 3.11318, -0.404932]
GrubbsClassic(v, 0.999) = [19, 3.11318, 0.200598]
ThreeSigma(v) = [19, 3.11318]
ThreeSigma(u) = [18, 1.90332]
vindex := [3; 19]
trim(v, vindex) = [12.1; 11.8; 12.4; 11.9; 12.3; 12.2; 11.7; 12.5; 12.1; 11.95; 12.05; 12.35; 11.85; 12.15; 12.25; 11.75; 12.45; 12.6]
M := augment(x, v) = [
    0, 12.1;
    1, 11.8;
    2, 12.4;
    3, 12;
    4, 11.9;
    5, 12.3;
    6, 12.2;
    7, 11.7;
    8, 12.5;
    9, 12.1;
    10, 11.95;
    11, 12.05;
    12, 12.35;
    13, 11.85;
    14, 12.15;
    15, 12.25;
    16, 11.75;
    17, 12.45;
    18, 12.6;
    19, 13.3
]
trim(M, vindex) = [
    0, 12.1;
    1, 11.8;
    2, 12.4;
    4, 11.9;
    5, 12.3;
    6, 12.2;
    7, 11.7;
    8, 12.5;
    9, 12.1;
    10, 11.95;
    11, 12.05;
    12, 12.35;
    13, 11.85;
    14, 12.15;
    15, 12.25;
    16, 11.75;
    17, 12.45;
    18, 12.6
]
A := Grubbs(M, 0.95) = [[0; 0], 2.52141, 0.514684]
A[0, 0] = [0; 0]
B := GrubbsClassic(v*m, 0.95) = [19, 3.11318, -0.404932]
C := Grubbs(augment(v, x), 0.95) = [[0; 1], 2.52141, 0.514684]
C[0, 0] = [0; 1]
