# Hyperbolic
θ := 103.2 deg = 1.80118
A := sinh(θ) = 2.94584
B := cosh(θ) = 3.11095
C := tanh(θ) = 0.946928
D := coth(θ) = 1.05605
asinh(A) = 103.2 deg
acosh(B) = 1.80118
atanh(C) = 1.80118
acoth(D) = 1.80118
S := sech(2*θ) = 0.0544782
asech(S) = 3.60236
T := csch(θ/2) = 0.973366
acsch(T) = 0.90059
