ε_cu2 := -0.0035
# if/else test
ε_c2 := -0.002
f_ck := 30 MPa
P1 := 0.25*ε_c2
P2 := 0.50*ε_c2
P3 := 0.75*ε_c2
n := 2
# statements without all cases covered, still work, aslong as the none-working branch is not called.
σ_c(ε) :=
    if ε_cu2 ≤ ε < ε_c2
        -f_ck
    if ε_c2 ≤ ε < 0
        -f_ck*(1 - (1 - ε/ε_c2)^n)
σ_c(P3) = -28125000 Pa
σ_c(-P3) =  # error: This program has no return value. You must account for all cases when using conditional statements in a Mathcad program.
# blank lines in programs ignored:
σ_cI(ε) :=
    if ε ≤ ε_cu2
        -f_ck
    if ε_cu2 ≤ ε < ε_c2
        -f_ck
    if ε_c2 ≤ ε < P3
        -f_ck - (-f_ck - σ_c(P3))/(ε_c2 - P3)*(ε_c2 - ε)
    if P3 ≤ ε < P2
        σ_c(P3) - (σ_c(P3) - σ_c(P2))/(P3 - P2)*(P3 - ε)
    if P2 ≤ ε < P1
        σ_c(P2) - (σ_c(P2) - σ_c(P1))/(P2 - P1)*(P2 - ε)
    if P1 ≤ ε < 0
        σ_c(P1)/P1*ε
σ_cI(-0.003) = -30000000 Pa
# plot with implied range and units
# [plot: σ_cI(ε_con/1000) (MPa) vs ε_con]
