# examples from support.ptc.com/help/mathcad/
# Example: Least-Square Spline
a := [
    309.4, 3560, 377.359;
    320.2, 3400, 368.782;
    329.8, 3800, 389.872;
    334, 3360, 366.606;
    339.2, 3120, 353.27;
    342.3, 3600, 379.473;
    345.4, 3520, 375.233;
    348.5, 3160, 355.528;
    353.6, 3360, 366.606;
    355.6, 3720, 385.746
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]
x := a[:, 0]
y := a[:, 1]
w := a[:, 2]
n := 3
b := Spline2(x, y, n, w)
b = [
    4; 34; 309.4; 445.936; 539.675; 592.506; 621.513; 645.946; 675.791; 711.843
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]
i := 0 .. b[1]
knots[i] := b[i + 2]
min(x) = 309.4
knots[0] = 309.4
max(x) = 1999.7
knots[length(knots) - 1] = 1999.7
i := 0 .. 100
range[i] := i*(max(x) - min(x))/101 + min(x)
spline1 := transpose(Binterp(range, b))
# [plot: y, spline1[:, 0] vs x, range]
DWS(b) = 2.13248
b[last(b) - 2] = 2.13248
level := 0.001
b2 := Spline2(x, y, n, w, level)
Nknots := b2[1] = 32
DWS(b2) = 1.87484
spline2 := transpose(Binterp(range, b2))
# [plot: spline1[:, 0], spline2[:, 0] vs range]
b3 := Spline2(x, y, n)
DWS(b3) = 2.13248
b4 := Spline2(x, y, n, 0.5)
DWS(b4) = 2.19022
fd := spline1[:, 1]
sd := spline1[:, 2]
td := spline1[:, 3]
# [plot: fd, 10*sd, 100*td vs range]
Knots := range
SplineW := Spline2(x, y, n, w, Knots)
spline3 := transpose(Binterp(range, SplineW))
DWS(SplineW) = 2.32173
# [plot: y, spline3 vs x, range]
SplineNW := Spline2(x, y, n, Knots)
DWS(SplineNW) = 2.39159
index := GrubbsClassic(y, 0.55)[0, 0]
index = 150
X_no := trim(x, index)
Y_no := trim(y, index)
W_no := trim(w, index)
b_no := Spline2(X_no, Y_no, n, W_no)
WithOutlier := DWS(b) = 2.13248
WithoutOutlier := DWS(b_no) = 2.0631
i := 0 .. 200
range[i] := 700 + i
spline_no := transpose(Binterp(range, b_no))
spline := transpose(Binterp(range, b))
# [plot: y, y[index], spline[:, 0], spline_no[:, 0] vs x, x[index], range]
# Example: Cubic Spline Interpolation
Cu := [
    0.367, 20.15;
    0.591, 24.41;
    0.796, 28.78;
    0.892, 29.57;
    1.547, 34.82;
    1.903, 37.41;
    2.15, 39.12;
    2.902, 44.09;
    2.894, 45.07;
    3.697, 50.24;
    4.703, 54.98;
    5.87, 61.38;
    6.307, 65.51;
    6.421, 66.25;
    7.03, 70.53;
    7.422, 73.42;
    7.898, 75.7;
    9.47, 89.57;
    9.484, 91.14
]
Cu := csort(Cu, 1)
vx := Cu[:, 1]
vy := Cu[:, 0]
c := cspline(vx, vy)
fitc(x) := interp(c, vx, vy, x)
l := lspline(vx, vy)
fitl(x) := interp(l, vx, vy, x)
p := pspline(vx, vy)
fitp(x) := interp(p, vx, vy, x)
m := 19 .. 95
x[m] := m
# [plot: vy, fitl(x), fitp(x), fitc(x) vs vx, x]
n := 0 .. 65
x[n] := 19 + n/10
# [plot: vy, fitl(x), fitp(x), fitc(x) vs vx, x]
sd_l(x) := d^2/dx^2(fitl(x))
sd_l(vx[0]) = 0
sd_l(vx[last(vx)]) = 0
sd_p(x) := d^2/dx^2(fitp(x))
sd_p(vx[0]) = -0.0114488
sd_p(vx[1]) = -0.0114486
sd_p(vx[last(vx) - 1]) = -0.0125566
sd_p(vx[last(vx)]) = -0.0125566
# Example: Linear Interpolation
Y := [2.7; 7.6; 3.6; 4.7; 8.4; 1.8; 6.9; 6; 2.2; 8.6]
i := 0 .. rows(Y) - 1
X[i] := i
j := 0 .. 95
X_int[j] := 0.1*j
Y_int[j] := linterp(X, Y, X_int[j])
# [plot: Y, Y_int vs X, X_int]
# Example: Linear Prediction 1
y := [
    3719; 3722; 3624; 3539; 3613; 3365; 3422; 3317; 3283; 3410
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]
i := 0 .. last(y)
observed_data[i] := i
# [plot: y vs observed_data]
Nprev := 15
Nnext := 10
y_pred := predict(y, Nprev, Nnext)
k := 0 .. last(y_pred)
predicted_values[k] := k + last(y)
# [plot: y, y_pred vs observed_data, predicted_values]
# How predict Works
N_previous := 3
N_future := 4
X := [2.7; 5.7; 6.8; 2.9; 5.1; 6.2; 2.5]
X[k] == c[0]*X[k - 3] + c[1]*X[k - 2] + c[2]*X[k - 1]
c := [0.881422439293; -0.417638429301; 0.522564333016]
Xpred[0] := c[0]*X[4] + c[1]*X[5] + c[2]*X[6]
Xpred[1] := c[0]*X[5] + c[1]*X[6] + c[2]*Xpred[0]
Xpred[2] := c[0]*X[6] + c[1]*Xpred[0] + c[2]*Xpred[1]
Xpred[3] := c[0]*Xpred[0] + c[1]*Xpred[1] + c[2]*Xpred[2]
Xpred = [3.21231; 6.09936; 4.04928; 2.40008]
predict(X, N_previous, N_future) = [3.21231; 6.09936; 4.04928; 2.40008]
# Error Messages
# The error messages returned by predict are often due to its arguments. In one case, the error message is related to the algorithm itself:
predict([2.7; 8.2; 1.9; 0.3; 2.7], 5, 3) =  # error: This value must be less than the number of data points.
# The predicted values cannot be a linear function of all the data points. You can use up to (n - 1) data points:
predict([2.7; 8.2; 1.9; 0.3; 2.7], 4, 3) = [4.65269; 1.31949; 0.979703]
# It is best to choose a value that is not too large relative to the amount of data points.
# Example: Linear Prediction 2
n := 0 .. 59
F[n] := sin(12*π*n/100) + cos(6*π*n/100)
# [plot: F[n] vs n]
k := 60 .. 79
CF[k] := sin(12*π*k/100) + cos(6*π*k/100)
tPF := predict(F, 10, 20)
r := 0 .. 19
PF[k] := tPF[k - 60]
# [plot: F[n], CF[k], PF[k] vs n, k]
p := 0 .. 24
G[p] := p
# [plot: G[p] vs p]
s := 25 .. 74
tCG[s - 25] := s
CG[s] := tCG[s - 25]
tPG := predict(G, 10, 100)
u := 25 .. 124
PG[u] := tPG[u - 25]
# [plot: G[p], CG[s], PG[u] vs p, s, u]
# Estimating Prior Values
X1 := transpose([0.81, 1.07, 1.83, 2.25, 3.01, 2.91, 1.87, 1.53, 1.40, 1.05])
m := 0 .. last(X1)
# [plot: X1[m] vs m]
Nvals := 3
Nterms := 7
P := predict(reverse(X1), Nterms, Nvals) = [1.46595; 1.54068; 1.25858]
X2 := reverse(P) = [1.25858; 1.54068; 1.46595]
k := -Nvals .. -1
t := -1 .. 0
con(t) := ((X2[2] - X1[0])/(-1))*t + X1[0]
# [plot: X1[m], X2[k + Nvals], con(t) vs m, k, t]
# Example: Polynomial Interpolation
x := [301; 306; 318; 332; 333]
y := [.02; 0.2; -0.04; .06; .17]
polyint(x, y, 328) = [-0.189434; -0.0559588]
r := 0 .. max(x) - min(x)
range[r] := r + min(x)
PI[r] := polyint(x, y, r + min(x))[0]
error[r] := polyint(x, y, r + min(x))[1]
PI_Error[r, 0] := (PI[r] - error[r])
PI_Error[r, 1] := (PI[r] + error[r])
# [plot: y, PI, PI_Error vs x, range]
i := 0 .. rows(x) - 1
c[i] := polycoeff(x, y)[i]
c = [18489.1; -249.995; 1.26207; -0.00282051; 2.35517e-6]
f(z) := sum(c[i]*z^i, i)
F[r] := f(r + min(x))
f1(z) := d/dz(f(z))
F1[r] := f1(r + min(x))
# [plot: y, F, F1 vs x, range]
N_max := length(x) - 1
ε := 0.01
polyiter(x, y, 328, N_max, ε) = [0; 4; -0.189434]
polyint(x, y, 328)[0] = -0.189434
# Example: Thiele Interpolation
npts := 10
j := 0 .. npts
f(x) := 1/(1 + 500*(x - 0.5)^2)
x_data[j] := j/npts
y_data := vectorize(f(x_data))
c := Thielecoeff(x_data, y_data)
x := 0, 0.01 .. 1
f_int(x) := Thiele(x_data, c, x)
fratint(x) := rationalint(x_data, y_data, x)
i := 0, 0.0002 .. 1
# [plot: y_data, f(x), f_int(x) vs x_data, x]
# [plot: f_int(x) - f(x) vs x]
X := transpose([0, 1, 2, 3, 4])
Y := transpose([1, 1, 3/5, 2/5, 5/17])
Thielecoeff(X, Y) = [1; 1e65; 0; -1e65; 0]
X := transpose([1, 2, 3, 4, 0])
Y := transpose([1, 3/5, 2/5, 5/17, 1])
vΓ := Thielecoeff(X, Y) = [1; -2.5; -1.2; 17.5; 0.2]
Q(a) := vΓ[0] + (a - X[0])/(vΓ[1] + (a - X[1])/(vΓ[2] + (a - X[2])/(vΓ[3] + (a - X[3])/vΓ[4])))
x := -10, -9.9 .. 10
# [plot: Y, Q(x) vs X, x]
# Example: Using Units with the Polynomial Interpolation Functions
# redeclare variables as orig units
m := m
s := s
vx := [4.4; 7.9; 3; 9.1; 2.0; 5.7; 2.6; 4; 8.5; 1.9]
vy := 4/vx
x := 3
xu := m
yu := s
X := vx*xu = [4.4; 7.9; 3; 9.1; 2; 5.7; 2.6; 4; 8.5; 1.9] m
Y := vy*yu = [0.909091; 0.506329; 1.33333; 0.43956; 2; 0.701754; 1.53846; 1; 0.470588; 2.10526] s
U := x*xu = 3 m
polyint(X, Y, U) = [1.33333; 0] s
polyint(X, Y, 2*U) = [0.667534; 0.00126968] s
L := length(X) - 1
M :=
    for u ∈ 0 .. L
        for v ∈ 0 .. 1
            M[u, v] ← polyint(X, Y, u*m)[v]
    M
    = [
        11.0044, 0.909091;
        3.87259, 0.0374726;
        2, 0;
        1.33333, 0;
        1, 0;
        0.799656, -0.000554075;
        0.667534, 0.00126968;
        0.575486, 0.00556904;
        0.499505, -0.000649643;
        0.446393, 0.00247025
    ] s
u := 0 .. L
I_int[u] := M[u, 0]
E_int[u] := M[u, 1]
# [plot: I_int[u], I_int[u] + E_int[u], I_int[u] - E_int[u] vs u]
# Polynomial Iteration
polyiter(X, Y, U, 2, 0.1*s) = [0; 2; 1.33333] s
polyiter(X, Y, U, 5, 0.1*s) = [1; 3; 1.33333] s
P_itr(ord, err) :=
    order ← ord
    error ← err
    for u ∈ 0 .. length(X) - 1
        K[u] ← error*s
        for v ∈ 0 .. 2
            N[u, v] ← polyiter(X, Y, u*m, order, error s)[v]
    Z ← augment(N, K)
    return Z
I_itr[u] := P_itr(3, 0.25)[u, 2]
E_itr[u] := P_itr(3, 0.25)[u, 3]
# [plot: I_itr[u], I_itr[u] + E_itr[u], I_itr[u] - E_itr[u] vs u]
# [plot: I_int[u], I_itr[u] vs u]
I0_itr[u] := P_itr(L, 0)[u, 2]
# [plot: I_int[u], I0_itr[u] vs u]
