# base 10 log (default) | natural log
log(1000) = 3
ln(20.086) = 3.00002
log(1000, 10) = 3
log(256, 2) = 8
# ln(0) doesnt work. ln0(0) does!
e^3 = 20.0855
ln(0) =  # error: This function is undefined at one or more points. You may be dividing by zero.
exp(3) = 20.0855
ln0(0) = -1e307
ln(-3) = 1.09861 + 3.14159i
e^(π*1i) + 1 = 1.22461e-16i
logspace(1, 1000, 4) = [1; 10; 100; 1000]
# you can overwrite functions!!
exp(x) := x + 2
log(x) := x^2
exp(2) = 4
log(2) = 4
