# Matrix functions - not complete yet!
A := [1; 2; 3; 4]
M := [3, 2, 1, 0; 2, 3, 2, 1; 1, 2, 3, 2; 0, 1, 2, 3]
B := [1, 1, 2, 2]
C := M*A = [10; 18; 22; 20]
B*C = 112
diag(M) = [3; 3; 3; 3]
# index of last (considers whether mathcad is set to index zero or 1)
last(A) = 3
length(A) = 4
MM := M + 2*identity(4) = [5, 2, 1, 0; 2, 5, 2, 1; 1, 2, 5, 2; 0, 1, 2, 5]
# Assemble matrix from vectors:
AA := augment(A, A, A) = [1, 1, 1; 2, 2, 2; 3, 3, 3; 4, 4, 4]
cols(A) = 1
rows(A) = 4
col0 := M[:, 0] = [3; 2; 1; 0]
row1 := M[1, :] = [2, 3, 2, 1]
elemM13 := M[1, 3] = 1
elemA1 := A[1] = 2
elemB2 := B[0, 2] = 2
A[1, 0] = 2
# determinant:
D := det(M) = 12
# Max/min element of matrix/vector:
min(M) = 0
max(M) = 3
# sum of diagonal:
tr(MM) = 20
sum(diag(MM)) = 20
# generate matrix with function:
f(x, y) := x^2 - y
M2 := matrix(3, 3, f) = [0, -1, -2; 1, 0, -1; 4, 3, 2]
# eigenvals:
e := eigenvals(M) = [7.16228; 3.41421; 0.837722; 0.585786]
eigenvec(M, e[0]) = [0.413453; 0.573635; 0.573635; 0.413453]
eigenvecs(M) = [
    0.413453, -0.653281, 0.573635, 0.270598;
    0.573635, -0.270598, -0.413453, -0.653281;
    0.573635, 0.270598, -0.413453, 0.653281;
    0.413453, 0.653281, 0.573635, -0.270598
]
# linear solve:
x := lsolve(M, A) = [0.333333; 0; 0; 1.33333]
M*x = [1; 2; 3; 4]
norm(x) = 1.37437
# submatrix
m := submatrix(MM, 2, 3, 2, 3) = [5, 2; 2, 5]
# transpose
transpose(A) = [1, 2, 3, 4]
transpose(M) = [3, 2, 1, 0; 2, 3, 2, 1; 1, 2, 3, 2; 0, 1, 2, 3]
# norm:
|A| = 5.47723
|M| = 12
# elementwise:
vectorize(M + 10) = [13, 12, 11, 10; 12, 13, 12, 11; 11, 12, 13, 12; 10, 11, 12, 13]
# Matrix normalizations and conditions
# L1:
norm1(M) = 8
cond1(M) = 16
# L2:
norm2(M) = 7.16228
cond2(M) = 12.2268
# euclidean:
norme(M) = 8
conde(M) = 16.8655
# infinity:
normi(M) = 8
condi(M) = 16
# cross product
a := [0; 1; 1]
b := [1; 2; 1]
c := a×b = [-1; 1; -1]
# generalizes (psuedo) inverse matrix
Mi := geninv(M) = [0.666667, -0.5, 0, 0.166667; -0.5, 1, -0.5, 0; 0, -0.5, 1, -0.5; 0.166667, 0, -0.5, 0.666667]
Mi*A = [0.333333; 0; 0; 1.33333]
# rank of M:
rank(M) = 4
# row-reduced echelon form:
rref(M) = [1, 0, 0, 0; 0, 1, 0, 0; 0, 0, 1, 0; 0, 0, 0, 1]
# definitions from elements:
[a1, a2, a3, a4; b1, b2, b3, b4; c1, c2, c3, c4; d1, d2, d3, d4] := M*kg
b2 = 3 kg
d3 = 2 kg
# example: down sampling
T0 := 2 s
fs := 16 Hz
i := 0 .. 200
ti[i] := i/fs = [
    0; 0.0625; 0.125; 0.1875; 0.25; 0.3125; 0.375; 0.4375; 0.5; 0.5625
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] s
v[i] := sin(2*π*ti[i]/T0) = [
    0; 0.19509; 0.382683; 0.55557; 0.707107; 0.83147; 0.92388; 0.980785; 1; 0.980785
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]
length(v) = 201
n := 28
j := 0 .. (length(v) - 1)/28 = [0; 1; 2; 3; 4; 5; 6; 7]
u[j] := v[n*j] = [0; -0.707107; -1; -0.707107; 0; 0.707107; 1; 0.707107]
range1[i] := i = [
    0; 1; 2; 3; 4; 5; 6; 7; 8; 9
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]
range2[j] := j*n = [0; 28; 56; 84; 112; 140; 168; 196]
# [plot: u, v vs range2, range1]
# Example: Finding the Left and Right Eigenvector
A := [3, 2; 3, -2]
V := eigenvals(A) = [4; -3]
λ_0 := V[0] = 4
λ_1 := V[1] = -3
# right (default):
R := eigenvecs(A, "R") = [0.894427, -0.316228; 0.447214, 0.948683]
R_0 := R[:, 0] = [0.894427; 0.447214]
R_1 := R[:, 1] = [-0.316228; 0.948683]
A*R_0 = [3.57771; 1.78885]
λ_0*R_0 = [3.57771; 1.78885]
A*R_1 = [0.948683; -2.84605]
λ_1*R_1 = [0.948683; -2.84605]
# Left:
L := eigenvecs(A, "L") = [0.948683, -0.447214; 0.316228, 0.894427]
L_0 := L[:, 0] = [0.948683; 0.316228]
L_1 := L[:, 1] = [-0.447214; 0.894427]
transpose(L_0)*A = [3.79473, 1.26491]
λ_0*transpose(L_0) = [3.79473, 1.26491]
transpose(L_1)*A = [1.34164, -2.68328]
λ_1*transpose(L_1) = [1.34164, -2.68328]
# Example: Covariance and Principal Component Analysis
D := [
    7.5, 12.0, 5.5;
    5.5, 8.5, 4.0;
    7.5, 12.0, 5.5;
    5.5, 8.5, 4.0;
    5.5, 9.0, 4.5;
    5.5, 8.5, 3.5;
    5.5, 8.5, 4.0;
    7.5, 12.0, 5.0;
    7.5, 12.0, 5.5;
    4.5, 7.5, 4.0;
    5.0, 8.0, 4.0;
    7.0, 11.0, 4.5;
    5.0, 8.5, 4.0;
    4.5, 7.5, 4.0;
    5.0, 8.0, 3.5;
    5.5, 9.0, 3.5;
    4.5, 7.5, 3.5;
    5.0, 8.0, 4.5;
    5.0, 8.0, 4.0;
    7.5, 11.5, 5.0;
    5.0, 8.5, 4.0;
    6.5, 10.5, 4.5;
    7.5, 12.0, 5.5;
    7.5, 12.0, 5.0;
    5.0, 8.0, 4.0;
    6.5, 10.0, 4.0
]  # Each row of D represents one observation, each column a measured characteristic.
# Calculate the covariance matrix of the sample.
i := 0 .. rows(D) - 1 = [0; 1; 2; 3; 4; 5; 6; 7; 8; 9; 10; 11; 12; 13; 14; 15; 16; 17; 18; 19; 20; 21; 22; 23; 24; 25]
j := 0 .. cols(D) - 1 = [0; 1; 2]
X[i, j] := D[i, j] - mean(D[:, j]) = [
    1.57692, 2.51923, 1.15385;
    -0.423077, -0.980769, -0.346154;
    1.57692, 2.51923, 1.15385;
    -0.423077, -0.980769, -0.346154;
    -0.423077, -0.480769, 0.153846;
    -0.423077, -0.980769, -0.846154;
    -0.423077, -0.980769, -0.346154;
    1.57692, 2.51923, 0.653846;
    1.57692, 2.51923, 1.15385;
    -1.42308, -1.98077, -0.346154;
    -0.923077, -1.48077, -0.346154;
    1.07692, 1.51923, 0.153846;
    -0.923077, -0.980769, -0.346154;
    -1.42308, -1.98077, -0.346154;
    -0.923077, -1.48077, -0.846154;
    -0.423077, -0.480769, -0.846154;
    -1.42308, -1.98077, -0.846154;
    -0.923077, -1.48077, 0.153846;
    -0.923077, -1.48077, -0.346154;
    1.57692, 2.01923, 0.653846;
    -0.923077, -0.980769, -0.346154;
    0.576923, 1.01923, 0.153846;
    1.57692, 2.51923, 1.15385;
    1.57692, 2.51923, 0.653846;
    -0.923077, -1.48077, -0.346154;
    0.576923, 0.519231, -0.346154
]
S1 := transpose(X)*X/(rows(D) - 1) = [1.29385, 1.94846, 0.637692; 1.94846, 2.98962, 0.996923; 0.637692, 0.996923, 0.435385]
# Compute and sort the eigenvalues.
V := reverse(sort(eigenvals(S1))) = [4.60271; 0.101249; 0.0148863]
# Compute the transform matrix.
x[j] := eigenvec(S1, V[j]) = [[0.526669; 0.804985; 0.273163]; [-0.271947; -0.144904; 0.95134]; [-0.805397; 0.575327; -0.142597]]
T := augment(x[0], x[1], x[2]) = [0.526669, -0.271947, -0.805397; 0.804985, -0.144904, 0.575327; 0.273163, 0.95134, -0.142597]
# Transform the original data.
D2 := D*T = [
    15.1122, 1.45392, 0.0791693;
    10.8317, 1.07797, -0.109788;
    15.1122, 1.45392, 0.0791693;
    10.8317, 1.07797, -0.109788;
    11.3708, 1.48119, 0.106578;
    10.6951, 0.602301, -0.0384893;
    10.8317, 1.07797, -0.109788;
    14.9757, 0.978255, 0.150468;
    15.1122, 1.45392, 0.0791693;
    9.50005, 1.49482, 0.120282;
    10.1659, 1.2864, 0.00524736;
    13.7708, 0.783462, 0.049137;
    10.5684, 1.21394, 0.292911;
    9.50005, 1.49482, 0.120282;
    10.0293, 0.810726, 0.0765456;
    11.0976, 0.529849, 0.249174;
    9.36347, 1.01915, 0.191581;
    10.3025, 1.76207, -0.0660509;
    10.1659, 1.2864, 0.00524736;
    14.5732, 1.05071, -0.137196;
    10.5684, 1.21394, 0.292911;
    13.1049, 0.991887, 0.164172;
    15.1122, 1.45392, 0.0791693;
    14.9757, 0.978255, 0.150468;
    10.1659, 1.2864, 0.00524736;
    12.5659, 0.588669, -0.0521936
]
# Calculate the covariance matrix of the transformed data.
i := 0 .. rows(D2) - 1 = [0; 1; 2; 3; 4; 5; 6; 7; 8; 9; 10; 11; 12; 13; 14; 15; 16; 17; 18; 19; 20; 21; 22; 23; 24; 25]
j := 0 .. cols(D2) - 1 = [0; 1; 2]
X[i, j] := D2[i, j] - mean(D2[:, j]) = [
    3.17365, 0.303815, 0.0147987;
    -1.10688, -0.0721384, -0.174158;
    3.17365, 0.303815, 0.0147987;
    -1.10688, -0.0721384, -0.174158;
    -0.567809, 0.33108, 0.0422073;
    -1.24346, -0.547808, -0.10286;
    -1.10688, -0.0721384, -0.174158;
    3.03707, -0.171855, 0.0860969;
    3.17365, 0.303815, 0.0147987;
    -2.43854, 0.344712, 0.0559116;
    -1.77271, 0.136287, -0.0591233;
    1.83217, -0.366648, -0.0152336;
    -1.37022, 0.0638348, 0.22854;
    -2.43854, 0.344712, 0.0559116;
    -1.90929, -0.339383, 0.012175;
    -0.840972, -0.62026, 0.184804;
    -2.57512, -0.130958, 0.12721;
    -1.63613, 0.611957, -0.130422;
    -1.77271, 0.136287, -0.0591233;
    2.63457, -0.0994031, -0.201567;
    -1.37022, 0.0638348, 0.22854;
    1.16634, -0.158223, 0.0998013;
    3.17365, 0.303815, 0.0147987;
    3.03707, -0.171855, 0.0860969;
    -1.77271, 0.136287, -0.0591233;
    0.627264, -0.561441, -0.116564
]
S2 := transpose(X)*X/(rows(D2) - 1) = [4.60271, 0, 0; 0, 0.101249, 0; 0, 0, 0.0148863]
# The principal components of the data are the diagonal elements of matrix S2.
α := 3.456
IsScalar(S2) = 0
IsArray(S2) = 1
IsScalar(α) = 1
IsArray(α) = 0
# Example: Using genvals and genvecs Functions
M := [
    7.5, 12, 5.5, 5.5, 8.5, 4;
    5.5, 8.5, 4, 7.5, 12, 5;
    7.5, 12, 5.5, 7.5, 12, 5.5;
    5.5, 8.5, 4, 4.5, 7.5, 4;
    5.5, 9, 4.5, 5, 8, 4;
    5.5, 8.5, 3.5, 7, 11, 4.5
]
N := [
    9, 13, 6.5, 6.5, 9.5, 5;
    5.5, 9, 4, 7.5, 10, 5;
    7.5, 12, 6, 7.5, 12, 5.5;
    5.5, 8.5, 6, 5, 7.5, 4;
    9.5, 3, 4.5, 3, 2.5, 4;
    3, 4.5, 3.5, 7, 11, 5
]
eigenvals(M) = [40.2739; 0.297931 + 0.148022i; 0.297931 - 0.148022i; -0.158657; -0.343004; -1.86806]
eigenvals(N) = [39.1263; 0.752107 + 1.70218i; 0.752107 - 1.70218i; -0.00287968; -2.06383 + 1.40981i; -2.06383 - 1.40981i]
genvals(M, N) = [285.568; 1.16624; 0.859482; 0.0292119; -0.0959197; -0.231778]
genvecs(M, N, "L") = [
    1, 0.533319, -1, -0.188666, -0.441702, 0.36387;
    -0.294653, -0.163537, 0.107359, -0.144204, -0.705668, -0.319155;
    -0.854189, -1, -0.68849, 1, 1, -1;
    -0.249414, 0.182894, 0.0835105, -0.261328, -0.678657, 0.663494;
    -0.12658, -0.0670197, 0.118566, -0.37532, 0.435091, -0.224206;
    0.534165, -0.00255893, 0.225472, -0.330749, 0.177842, 0.830346
]
# Example: Matrix Norm and Determinant Functions
M := [1, 0, 7; 9, 5, 8; 3, 4, 2]
[a_0, a_1, a_2; b_0, b_1, b_2; c_0, c_1, c_2] := M
# Use the norm1 function to find the L1 norm of matrix M
norm1(M) = 17
# Alternatively, find the L1 norm by calculating the maximum of the absolute column sums of M.
ACS_0 := |a_0| + |b_0| + |c_0| = 13
ACS_1 := |a_1| + |b_1| + |c_1| = 9
ACS_2 := |a_2| + |b_2| + |c_2| = 17
N_L1 := max(ACS_0, ACS_1, ACS_2) = 17
# Use the norm2 function to find the L2 norm of matrix M.
norm2(M) = 14.8419
# Alternatively, use the svds function to find the largest absolute singular value of matrix M.
svds(M) = [14.8419; 5.09791; 1.65207]
# The svds function returns a vector of sorted singular values, so the top value is the largest singular value of matrix M.
# Use the norme function to find the Euclidean norm of matrix M.
norme(M) = 15.7797
# Alternatively, manually calculate the square root of the sum of the absolute squares of matrix M.
N_e := sqrt(|a_0|^2 + |a_1|^2 + |a_2|^2 + |b_0|^2 + |b_1|^2 + |b_2|^2 + |c_0|^2 + |c_1|^2 + |c_2|^2) = 15.7797
# Use the normi function to find the Infinity norm of matrix M.
normi(M) = 22
# Alternatively, use the max function to manually calculate the maximum of the absolute row sums of matrix M.
ARS_0 := |a_0| + |a_1| + |a_2| = 8
ARS_1 := |b_0| + |b_1| + |b_2| = 22
ARS_2 := |c_0| + |c_1| + |c_2| = 9
N_i := max(ARS_0, ARS_1, ARS_2) = 22
# Use the det function to find the determinant of matrix M.
det(M) = 125
DET := a_0*(b_1*c_2 - b_2*c_1) - a_1*(b_0*c_2 - b_2*c_0) + a_2*(b_0*c_1 - b_1*c_0) = 125
# Use the norm function to find the norm of a vector containing the elements of column 0 of matrix M.
v := [a_0; b_0; c_0] = [1; 9; 3]
norm(v) = 9.53939
# Alternatively, manually calculate the norm of vector v.
N := sqrt(a_0^2 + b_0^2 + c_0^2) = 9.53939
