f_cd := 30 MPa/1.5 = 20 MPa
β := 120 deg
# internal friction angle:
ϕ := 37 deg
μ := tan(ϕ) = 0.753554
k := (1 + sin(ϕ))/(1 - sin(ϕ)) = 4.02279
# internal cohesion:
c := f_cd/(2*sqrt(k)) = 4.98582 MPa
v := 2/sqrt(30) = 0.365148
c_eff := v*c = 1.82056 MPa
f_eff := f_cd*v = 7.30297 MPa
p := c_eff*cot(ϕ)*(tan(π/4 + ϕ/2)^2*exp((2*β - π)*tan(ϕ)) - 1) = 18.9799 MPa
# Semi inifinte
p := c_eff*cot(ϕ)*(tan(π/4 + ϕ/2)^2*exp(π*tan(ϕ)) - 1) = 101.277 MPa
