# Probabilistic examples
# Example: Probability Density and Cumulative Probability Distribution
μ := 2
σ := 1
# [plot: dnorm(x, μ, σ), pnorm(x, μ, σ), cnorm(x) vs x]
p := 0.5
q := qnorm(p, μ, σ) = 2
integral(x*dnorm(x, μ, σ), x = -25 .. 25) = 2
pnorm(q, μ, σ) = 0.5
i := 0 .. 1
range[i] := i
x_75[i] := qnorm(0.75, μ, σ)
x_90[i] := qnorm(0.90, μ, σ)
x_95[i] := qnorm(0.95, μ, σ)
# [plot: dnorm(x, μ, σ), pnorm(x, μ, σ), range vs x, x_75, x_90, x_95]
# Example: Probability Distributions
# chi-squared
dchisq(5.5, 11) = 0.0579163
# Use the dt function to calculate the probability density of variable t with 4 degrees of freedom, at -1.56:
dt(-1.56, 4) = 0.1143
# Cumulative Probability
1 - pnorm(1, 0, 1) = 0.158655
pchisq(5.6, 7) = 0.412849
pbinom(10, 15, 0.6) = 0.782722
qbinom(0.783, 15, 0.6) = 11
rbinom(5, 7, 0.65) = [3; 5; 2; 6; 5]
dbeta(0.8, 3, 2) = 1.536
1 - pbeta(0.8, 3, 2) = 0.1808
qbeta(0.8, 3, 2) = 0.787683
rbeta(5, 6, 0.75) = [0.904963; 0.685805; 0.903173; 0.519901; 0.866721]
# Inverse Cumulative Probability
qnorm(0.95, 0, 1) = 1.64485
qt(0.99, 6) = 3.14267
# F-Distribution
qF(0.65, 4, 6) = 1.36028
pF(0.75, 5, 7) = 0.388535
qF(0.95, 9, 8) = 3.38813
rF(7, 2, 3) = [0.486098; 9.92155; 0.876801; 0.388788; 0.164239; 4.9053; 8.51397]
# Example: Chi-Square Test for Goodness of Fit
Obs := [12; 39; 17; 18; 9]
Exp := [9.5; 42.75; 19; 14.25; 9.5]
sum(Obs) = 95
sum(Exp) = 95
ν := length(Obs) - 1 = 4
χ2 := sum(vectorize((Obs - Exp)^2/Exp)) = 2.21053
α := 0.05
P := 1 - pchisq(χ2, ν) = 0.697103
P ≥ α = 1
Χ2 := qchisq(1 - α, ν) = 9.48773
Χ2 > χ2 = 1
# Accept the null hypothesis. There is evidence that the expected results fit the observations.
# [plot: dchisq(x, ν) vs x]
rchisq(9, 3) = [5.23164; 2.19481; 1.08274; 0.354063; 0.23759; 0.167177; 2.68899; 5.2615; 4.25208]
# Example: T-Score of a Vector of Data
X := [7.07; 7.1; 7; 7.01; 6.98; 7; 6.97; 7.03; 7.01; 7.08]
N := length(X) = 10
m_s := mean(X) = 7.025
s := stdev(X)*sqrt(N/(N - 1))
SEM := s/sqrt(N) = 0.0139244
v := N - 1
α := 0.005
μ := 7
t := (m_s - μ)/SEM = 1.79541
P := 2*(1 - pt(|t|, v)) = 0.106159
P < α = 0
crit := |qt(α/2, v)| = 3.68966
student(x) := Re(dt(x, v))
# [plot: student(x) vs x]
# Example: Z Score of a Vector of Data
X := [
    5.791; 5.344; 7.328; 1.112; 5.926; 5.805; 3.704; 3.027; 6.763; 4.305
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]
N := length(X) = 100
m_s := mean(X) = 5.12485
α := 0.01
σ := 5
μ := 2
z := (m_s - μ)/(σ/sqrt(N)) = 6.2497
P := 2*(1 - pnorm(z, 0, 1)) = 4.11242e-10
P ≥ α = 0
crit := |qnorm(α/2, 0, 1)| = 2.57583
|z| < crit = 0
normal(q) := dnorm(q, 0, 1)
# Example: T-Test on Normal Means
data1 := [22; 48; 88; 35; 7; 98; 57; 39; 76; 81]
data2 := [55; 22; 67; 12; 45; 21; 67; 78; 83; 92]
n1 := length(data1) = 10
n2 := length(data2) = 10
m1 := mean(data1) = 55.1
m2 := mean(data2) = 54.2
s1 := stdev(data1)*sqrt(n1/(n1 - 1)) = 30.1052
s2 := stdev(data2)*sqrt(n2/(n2 - 1)) = 28.2009
ν := n1 + n2 - 2
s := sqrt(((n1 - 1)*s1^2 + (n2 - 1)*s2^2)/ν*(1/n1 + 1/n2)) = 13.0446
α := 0.01
t := (m1 - m2)/s = 0.0689942
P := 2*(1 - pt(|t|, ν)) = 0.945755
P ≤ α = 0
crit := |qt(α/2, ν)| = 2.87844
|t| > crit = 0
# [plot: dt(x, ν) vs x]
# random number with student dist:
m := 5
rt(m, ν) = [0.136456; 0.0663681; -1.83011; -1.42332; 0.351712]
# Example: Generating Random Numbers
# Uniformly Distributed
n_set := 1*10^3
low := 0
high := 2
random_set := runif(n_set, low, high)
n_bins := 20
n := 0 .. n_bins
range[n] := n
uniform := hist(n_bins, random_set)
means[n] := n_set/n_bins
# [plot: uniform, means vs range]
# Normally Distributed
μ := 0
σ := 2
random_set := rnorm(n_set, μ, σ)
lower := floor(min(random_set)) = -8
upper := ceil(max(random_set)) = 6
w := (upper - lower)/n_bins
x[n] := lower + w*n
x[n] := lower + w*n
int := x + 0.5*w
F[n] := n_set*w*dnorm(int[n], μ, σ)
normal := hist(x, random_set)
# [plot: normal, F vs int]
# Exponentially Distributed
r := 0.5
random_set := rexp(n_set, r)
lower := floor(min(random_set)) = 0
upper := ceil(max(random_set)) = 19
w := (upper - lower)/n_bins
y[n] := lower + w*n
y[n] := lower + w*n
int := y + 0.5*w
F[n] := n_set*w*dexp(int[n], r)
exponential := hist(y, random_set)
# [plot: exponential, F vs int]
# Call functions pexp and qexp to calculate and plot the cumulative probability distribution for value x and the inverse cumulative probability distribution for value p, respectively.
Fp[n] := n_set*w*pexp(int[n], r)
Fq[n] := n_set*w*qexp(int[n]/100, r)
# [plot: F, Fp, Fq vs int]
# Monte carlo
L := 1
S := 0.5
NSamples := 1*10^4
SSize := 100
i := 0 .. NSamples - 1
Means[i] := mean(rlogis(SSize, L, S))
# Estimate the probability that the mean of a set of random numbers lies within interval [a, b].
width := 0.1
a := L - width
b := L + width
Success := sum(a ≤ Means[i - 1] ≤ b, i = 1 .. NSamples)
Prob := Success/NSamples = 0.7359
# The probability depends on the number of data points in each sample and on the width of the interval.
# 5.Plot the plogis function to show the cumulative probability distribution of the logistic distribution. Use a horizontal marker to mark the probability level.
z := 0.5, 0.6 .. 1.5
# [plot: plogis(x, L, S), plogis(z, L, S) vs x, z]
Lp := plogis(a, L, S) = 0.450166
Up := plogis(b, L, S) = 0.549834
# [plot: plogis(z, L, S) vs z]
# [plot: dlogis(x, L, S), dlogis(z, L, S) vs x, z]
# [plot: dlogis(z, L, S) vs z]
qlogis(Prob, L, S) = 1.51238
# Example: Cauchy Distribution
f(x, l, s) := 1/π*(s/((x - l)^2 + s^2))
l_0 := 0
l_1 := 2
l_2 := -2
s_0 := 1
s_1 := 1
s_2 := 1
height_0 := 1/(π*s_0) = 0.31831
# [plot: dcauchy(x, l_0, s_0), dcauchy(x, l_1, s_0), dcauchy(x, l_2, s_0) vs x]
# [plot: pcauchy(x, l_0, s_0), pcauchy(x, l_1, s_0), pcauchy(x, l_2, s_0) vs x]
l_0 := 0
l_1 := 2
l_2 := 4
s_0 := 1
s_1 := 4*s_0
s_2 := 8*s_0
x0 := 0, 0.01 .. 1
# [plot: qcauchy(x0, l_0, s_0), qcauchy(x0, l_1, s_0), qcauchy(x0, l_2, s_0) vs x0]
m := 50
n := 0 .. m - 1
R := rcauchy(m, l_0, s_0)
# [plot: R[n] vs n]
# Example: Gamma Distribution Functions
s := 3
x := [7; 2; 6; 9; 11]
dgamma(x, s) = [0.0223411; 0.270671; 0.0446175; 0.0049981; 0.00101045]
pgamma(x, s) = [0.970364; 0.323324; 0.938031; 0.993768; 0.998789]
qgamma(x/100, s) = [0.9423; 0.56721; 0.882461; 1.05143; 1.15069]
m := 7
rgamma(m, s) = [6.28534; 5.99801; 0.672507; 3.16507; 0.310428; 2.2283; 2.36295]
# Example: Geometric and Hypergeometric Distribution Functions
k := 3
q := 0.75
dgeom(k, q) = 0.0117188
pgeom(k, q) = 0.996094
p := 0.85
pgeom(p, q) = 0.75
m := 8
rgeom(m, q) = [0; 6; 0; 0; 0; 0; 0; 0]
# Hypergeometric Distribution
a := 5
b := 4
m := 3
n := 6
dhypergeom(m, a, b, n) = 0.47619
phypergeom(m, a, b, n) = 0.595238
p := 0.85
qhypergeom(p, a, b, n) = 4
rhypergeom(m, a, b, n) = [2; 4; 3]
# Example: Binomial and Negative Binomial Distributions
k := 2
n := 5
q := 0.75
dbinom(k, n, q) = 0.0878906
pbinom(k, n, q) = 0.103516
p := 0.65
qbinom(p, n, q) = 4
m := 3
rbinom(m, n, q) = [3; 4; 4]
# Negative Binomial Distributions
dnbinom(k, n, q) = 0.222473
pnbinom(k, n, q) = 0.756409
p := 0.65
qnbinom(p, n, q) = 2
rnbinom(m, n, q) = [0; 3; 3]
q := [0.1; 0.3; 0.5; 0.7; 0.9]
i := 0 .. length(q) - 1
P := pbinom(k, n, q) = [0.99144; 0.83692; 0.5; 0.16308; 0.00856]
Pn := pnbinom(k, n, q) = [0.0001765; 0.0287955; 0.226563; 0.64707; 0.974309]
# [plot: P[i], Pn[i] vs i]
# Example: Log Normal Distribution Functions
μ := 2
x := [7; 3; 12; 9; 8]
σ := 5
dlnorm(x, μ, σ) = [0.0113977; 0.0261675; 0.00661784; 0.00885849; 0.0099723]
plnorm(x, μ, σ) = [0.495684; 0.428467; 0.538629; 0.515732; 0.506338]
p := 0.75
qlnorm(p, μ, σ) = 215.39
m := 8
rlnorm(m, μ, σ) = [39.1615; 0.0117475; 5.48602; 7.83748; 5.34451; 1.89708; 0.059375; 0.0256729]
# poison
k := [7; 3; 12; 9; 8]
λ := 3
dpois(k, λ) = [0.021604; 0.224042; 5.52376e-5; 0.0027005; 0.00810151]
ppois(k, λ) = [0.988095; 0.647232; 0.999984; 0.998898; 0.996197]
p := 0.75
qpois(p, λ) = 4
m := 8
rpois(m, λ) = [3; 6; 2; 2; 1; 2; 3; 3]
# Weibull
x := [1.254; 0.965; 1.193; 0.802; 0.8]
s := 6.8
dweibull(x, s) = [0.239138; 2.52297; 0.684084; 1.51305; 1.49691]
pweibull(x, s) = [0.990537; 0.543811; 0.963852; 0.199918; 0.196908]
p := 0.9
qweibull(p, s) = 1.13049
m := 7
rweibull(m, s) = [1.08815; 0.869655; 1.04458; 1.28188; 0.926962; 1.04498; 1.13046]
