# Use functions Seed and rnorm in a short program to generate identical sets of normally distributed random numbers for three iterations by resetting the Seed value.
p := 1000
μ := 0
σ := 2
Same(p, μ, σ) :=
    for i ∈ 0 .. 2
        Seed(1)
        nums ← rnorm(p, μ, σ)
        M[:, i] ← nums
    M
n_bins := 20
n := 0 .. n_bins
range[n] := n
q := 0 .. p - 1
S1[q] := Same(p, μ, σ)[:, 1][q] = [
    -0.877942; -1.35881; -0.946572; -1.90293; -3.37137; 0.0870606; -0.24127; 1.11285; 4.38357; 1.61747
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]
same := hist(n_bins, S1)
max(same) = 129
# [plot: same vs range]
Seed(1)
runif(20, 0, 1) = [0.00126842; 0.193323; 0.585006; 0.350308; 0.822838; 0.174129; 0.710495; 0.303986; 0.0914113; 0.147313; 0.988508; 0.11908; 0.00892266; 0.531664; 0.601764; 0.166249; 0.450786; 0.0570559; 0.783319; 0.519876]
Seed(1) = 1
rnorm(1, 0, 1) = [-0.438971]
runif(4, 0, 1) = [0.822838; 0.174129; 0.710495; 0.303986]
