# shrinkage calculations
f_ck := 35 MPa
f_cm := f_ck + 8 MPa
# external wall thickness:
t := 600 mm
h_0 := 100 mm
# nominal thickness (1 sided exposure)
h_0 := t*2 = 1.2 m
k_h(h) := linterp(transpose([0 mm, 100 mm, 200 mm, 300 mm, 500 mm, 1 m]), transpose([1.0, 1.0, 0.85, 0.75, 0.70, 0.70]), h)
β_RH(RH) := 1.55*(1 - (RH/100%)^3)
α := ListBoxScriptableControl(vals(Class S, Class N, Class R))
# Cement:
RH := 80%
ε_cd0 := 0.85*((220 + 110*α[0])*exp(-α[1]*f_cm/(10 MPa)))*10^-6*β_RH(RH) = 202.191*10^-6
β_ds(t, t_s) := (t - t_s)/((t - t_s) + 0.04 day*sqrt((h_0/mm)^3))
ε_cd_100mm := (3.518*10^-4)
t_s := 3 day
t := 50 yr
ε_cd_1200 := 2.262*10^-4
ε_cd := β_ds(t, t_s)*k_h(h_0)*ε_cd0 = 0.000129721
ε_ca := (2.5*(f_ck/MPa - 10)*10^-6)*(1 - exp(-0.2*(t/day)^0.5)) = 6.25e-5
(ε_cd_100mm*2*100*mm + ε_core*1000*mm)/(1200*mm) == ε_cd_1200
ε_cs := ε_cd + ε_ca = 0.000192221
ε_core := (1200 mm*ε_cd_1200 - ε_cd_100mm*2*100 mm)/(1000 mm) = 0.00020108
α := 1*10^-5 1/K
T_u := ε_cd_100mm/α = 35.18 K
T_core := ε_core/α = 20.108 K
T_ave := ε_cd_1200/α = 22.62 K
