solve block
    # guess values
    x := 3
    # constraints
    a*x^2 - b == cos(x)
    # solver
    f(a, b) := find(x)
end solve block
G := f(1, 3) = 1.69571
a := 1
b := 3
cos(G) = -0.124584
a*G^2 - b = -0.124584
