i := 0 .. 4
j := 0 .. 4
A := [4; 3; 7; 1; 9; 6; 3; 5]
M[i, j] := 19 - i*4 - i^2 + i*j - 6*j - 2*j^2 = [
    19, 11, -1, -17, -37;
    14, 7, -4, -19, -38;
    7, 1, -9, -23, -41;
    -2, -7, -16, -29, -46;
    -13, -17, -25, -37, -53
]
sort(A) = [1; 3; 3; 4; 5; 6; 7; 9]
csort(M, 4) = [
    -13, -17, -25, -37, -53;
    -2, -7, -16, -29, -46;
    7, 1, -9, -23, -41;
    14, 7, -4, -19, -38;
    19, 11, -1, -17, -37
]
reverse(M) = [
    -13, -17, -25, -37, -53;
    -2, -7, -16, -29, -46;
    7, 1, -9, -23, -41;
    14, 7, -4, -19, -38;
    19, 11, -1, -17, -37
]
rsort(M, 2) = [
    -37, -17, -1, 11, 19;
    -38, -19, -4, 7, 14;
    -41, -23, -9, 1, 7;
    -46, -29, -16, -7, -2;
    -53, -37, -25, -17, -13
]
