i := 1 .. 12
x[i] := i
length(x) = 13
y := [3; 2.5; 2; 1.5; 1.5; 2; 4; 6; 10; 14; 18; 22; 26]
length(y) = 13
b := Spline2(x, y, 3) = [4; 2; 0; 6; 12; 3.01072; 2.26662; -3.22887; 19.081; 25.9036; 0.204918; 0; 3.1094; 0.999997; 0.769039]
b2 := Spline2(x, y, 3, 0.5) = [4; 2; 0; 6; 12; 3.01072; 2.26662; -3.22887; 19.081; 25.9036; 0.204918; 0; 3.1094; 0.999997; 0.769039]
b3 := Spline2(x, y, 3, 0.001) = [4; 2; 0; 6; 12; 3.01072; 2.26662; -3.22887; 19.081; 25.9036; 0.204918; 0; 3.1094; 0.999997; 0.769039]
