N := 44
i := 0 .. N
x[i] := 4*(i/N) + 6*((i/N)^2) = [
    0; 0.0940083; 0.194215; 0.30062; 0.413223; 0.532025; 0.657025; 0.788223; 0.92562; 1.06921
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]
q(t) :=
    if t ≤ 5
        1 + 0.2*t
    else if t ≤ 8
        2 + (t - 5)^2
    else
        11 - 1.5*(t - 8)
Seed(1) = 805570353
nz := rnorm(N + 1, 0, 0.85) = [
    -0.373125; -0.577495; -0.402293; -0.808746; -1.43283; 0.0370007; -0.10254; 0.472962; 1.86302; 0.687424
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]
y[i] := q(x[i]) + nz[i] = [
    0.626875; 0.441307; 0.63655; 0.251378; -0.350187; 1.14341; 1.02887; 1.63061; 3.04814; 1.90127
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]
b := Spline2(x, y, 3) = [4; 6; 0; 0.967837; 2.34635; 4.26684; 6.13716; 8.04492; 10; 0.60977; -0.313636; 3.74644; -0.571576; 3.89914; -1.02062; 14.6066; 7.55771; 8.63574; 0.700922; 0; 2.18883; 0.984423; 0.203183]
b2 := Spline2(x, y, 3, 0.5) = [
    4; 29; 0; 0.141963; 0.290382; 0.470007; 0.651172; 0.799105; 0.943901; 1.10365
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]
b3 := Spline2(x, y, 3, 0.001) = [4; 6; 0; 0.834022; 2.00069; 3.5; 5.33402; 7.50069; 10; 0.873848; -1.09823; 4.32829; -0.7283; 3.86941; -1.36519; 10.5064; 10.6128; 8.02198; 0.833401; 0; 1.58935; 0.517578; 0.00158989]
