N := 30
i := 0 .. N
x[i] := i/3 = [
    0; 0.333333; 0.666667; 1; 1.33333; 1.66667; 2; 2.33333; 2.66667; 3
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]
q(t) := 5 + sin(t/2)
Seed(2) = 4081957518
nz := rnorm(N + 1, 0, 0.4) = [
    -0.041734; -0.69394; -0.223838; 0.157458; -0.480114; -0.183283; 0.0768778; 0.129468; 0.308827; -0.241416
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]
y[i] := q(x[i]) + nz[i] = [
    4.95827; 4.47196; 5.10336; 5.63688; 5.13826; 5.55689; 5.91835; 6.04891; 6.28077; 5.75608
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]
k2 := [0; 5; 10]
k4 := [0; 2.5; 5; 7.5; 10]
k5 := [0; 2; 4; 6; 8; 10]
k8 := [0; 1.25; 2.5; 3.75; 5; 6.25; 7.5; 8.75; 10]
k10 := [0; 1; 2; 3; 4; 5; 6; 7; 8; 9; 10]
s2 := Spline2(x, y, 3, k2) = [4; 2; 0; 5; 10; 4.56377; 6.1806; 6.64648; 3.16969; 4.67359; 0.337055; 0; 2.1946; 0.924425; 0.377637]
s4 := Spline2(x, y, 3, k4) = [4; 4; 0; 2.5; 5; 7.5; 10; 4.80843; 4.84456; 6.73025; 5.73567; 4.00264; 4.11146; 4.55746; 0.332756; 0; 2.38985; 0.994837; 0.403374]
s5 := Spline2(x, y, 3, k5) = [4; 5; 0; 2; 4; 6; 8; 10; 4.77061; 4.98174; 5.88762; 6.62238; 4.64844; 4.34157; 3.9348; 4.63266; 0.330149; 0; 2.47894; 0.999185; 0.402896]
s8 := Spline2(x, y, 3, k8) = [4; 8; 0; 1.25; 2.5; 3.75; 5; 6.25; 7.5; 8.75; 10; 4.85483; 4.54409; 5.7626; 5.81328; 6.58947; 5.51308; 4.84281; 4.14737; 4.51369; 3.7408; 4.75292; 0.341026; 0; 2.44191; 0.999979; 0.0997878]
s10 := Spline2(x, y, 3, k10) = [
    4; 10; 0; 1; 2; 3; 4; 5; 6; 7
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]
sq := Spline2(x, y, 2, k5) = [3; 5; 0; 2; 4; 6; 8; 10; 4.75867; 5.15639; 6.46134; 5.70286; 4.34812; 4.07707; 4.5307; 0.332865; 0; 2.41855; 0.996008; 0.437209]
sf := Spline2(x, y, 4, k5)  # error: The value of one of the arguments is too large.
