N := 44
i := 0 .. N
x[i] := 4*(i/N) + 6*((i/N)^2) = [
    0; 0.0940083; 0.194215; 0.30062; 0.413223; 0.532025; 0.657025; 0.788223; 0.92562; 1.06921
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]
q(t) :=
    if t ≤ 5
        1 + 0.2*t
    else if t ≤ 8
        2 + (t - 5)^2
    else
        11 - 1.5*(t - 8)
Seed(1) = 805570353
nz := rnorm(N + 1, 0, 0.85) = [
    -0.373125; -0.577495; -0.402293; -0.808746; -1.43283; 0.0370007; -0.10254; 0.472962; 1.86302; 0.687424
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]
y[i] := q(x[i]) + nz[i] = [
    0.626875; 0.441307; 0.63655; 0.251378; -0.350187; 1.14341; 1.02887; 1.63061; 3.04814; 1.90127
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]
c1 := Spline2(x, y, 3, 0.1) = [4; 6; 0; 0.967837; 2.34635; 4.26684; 6.13716; 8.04492; 10; 0.60977; -0.313636; 3.74644; -0.571576; 3.89914; -1.02062; 14.6066; 7.55771; 8.63574; 0.700922; 0; 2.18883; 0.984423; 0.203183]
c2 := Spline2(x, y, 3, 0.2) = [4; 6; 0; 0.967837; 2.34635; 4.26684; 6.13716; 8.04492; 10; 0.60977; -0.313636; 3.74644; -0.571576; 3.89914; -1.02062; 14.6066; 7.55771; 8.63574; 0.700922; 0; 2.18883; 0.984423; 0.203183]
c3 := Spline2(x, y, 3, 0.3) = [
    4; 15; 0; 0.394008; 0.859374; 1.56229; 2.68846; 3.64251; 4.22026; 4.65376
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]
c4 := Spline2(x, y, 3, 0.4) = [
    4; 15; 0; 0.394008; 0.859374; 1.56229; 2.68846; 3.64251; 4.22026; 4.65376
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]
c5 := Spline2(x, y, 3, 0.5) = [
    4; 29; 0; 0.141963; 0.290382; 0.470007; 0.651172; 0.799105; 0.943901; 1.10365
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]
c6 := Spline2(x, y, 3, 0.6) = [4; 5; 0; 2.05138; 4.17138; 6.16472; 7.9805; 10; -0.267282; 3.00264; -0.099334; 3.32676; -0.627622; 14.0059; 7.90728; 8.57089; 0.760734; 0; 1.84389; 0.768281; 0.0344072]
c7 := Spline2(x, y, 3, 0.7) = [4; 5; 0; 2.05138; 4.17138; 6.16472; 7.9805; 10; -0.267282; 3.00264; -0.099334; 3.32676; -0.627622; 14.0059; 7.90728; 8.57089; 0.760734; 0; 1.84389; 0.768281; 0.0344072]
c8 := Spline2(x, y, 3, 0.8) = [4; 7; 0; 1.18441; 2.61935; 4.53384; 6.60343; 8.06163; 9.10674; 10; 0.337542; 0.46143; 3.13042; -0.0485207; 3.60191; -0.450792; 13.6026; 6.85698; 10.5915; 8.14399; 0.704035; 0; 2.05667; 0.972378; 0.0646442]
