i := 0 .. 2
V := [1; 2; 3]
R := [5, 6, 7]
j := 0 .. 2
s[i, j] := 1 + i^2*j + j = [1, 2, 3; 1, 3, 5; 1, 6, 11]
b := 50 + s = [51, 52, 53; 51, 53, 55; 51, 56, 61]
S := stack(["A", "B", "C"], s) = ["A", "B", "C"; 1, 2, 3; 1, 3, 5; 1, 6, 11]
W := augment(["X"; "Y"; "Z"], s) = ["X", 1, 2, 3; "Y", 1, 3, 5; "Z", 1, 6, 11]
M := augment(["Ø"; "X"; "Y"; "Z"], S) = ["Ø", "A", "B", "C"; "X", 1, 2, 3; "Y", 1, 3, 5; "Z", 1, 6, 11]
# loopkup and return indicies of matches:
match(3, V) = [2]
k := match(7, R) = [[0; 2]]
k[0] = [0; 2]
ij := match(3, s) = [[1; 1]; [0; 2]]
ij[0] = [1; 1]
ij[1] = [0; 2]
# Lookup index of value in matrix 1 and return value at said index of matrix 2
lookup(3, s, b) = [53; 53]
vlookup("Y", W, 1) = [1]
hlookup("C", S, 2) = [5]
vhlookup("X", "C", M) = [3]
