data := [79; 85; 46; 86; 81]
mean(data) = 75.4
N := length(data)
1/N*sum(data[i], i = 0 .. N - 1) = 75.4
# Change one of the data points before recalculating the mean.
data[2] := 1.2*data[2]
mean(data) = 77.24
median(data) = 81
sort(data) = [55.2; 79; 81; 85; 86]
# Since there are no repeated values in data, an error is returned.
mode(data) =  # error: No value occurs more frequently than any others.
i := 0 .. N - 1
Data[i] := data[i]
Data[i + N] := data[i] = [79; 85; 55.2; 86; 81]
transpose(Data) = [79, 85, 55.2, 86, 81, 79, 85, 55.2, 86, 81]
gmean(Data) = 76.277
mean(Data) = 77.24
hmean(Data) = 75.1739
# Use the mode function to show that an error is returned when more than one data value is repeated with the same frequency.
mode(Data) =  # error: Can not return the mode of the data, because the data is multimodal. More than one value occurs at the highest frequency.
Data := [1; 2; 3; 4; 4; 5; 6]
mode(Data) = 4
# percentile
i := 0 .. 10
X[i] := i
transpose(X) = [0, 1, 2, 3, 4, 5, 6, 7, 8, 9, 10]
percentile(X, 50*%) = 5
percentile(X, 0.90) = 9.8
quartile1 := percentile(data, 0.25) = 67.1
# Example: Confidence Interval for the Mean
data := [
    6.802; 4.137; 5.405; 4.611; 6.86; 5.158; 0.741; 5.716; 6.672; 4.019
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]
N := length(data) = 40
m.s := mean(data) = 4.95637
s := stdev(data)*sqrt(N/(N - 1)) = 1.30785
ν := N - 1 = 39
# Enter the two-tailed significance level:
α := 0.05
# Use function qt to calculate the 95th percentile of the Student t-distribution for a two-tailed test.
p := |qt(α/2, ν)| = 2.02269
# Calculate the lower and upper limits of the confidence interval.
l := m.s - p*s/sqrt(N) = 4.5381
u := m.s + p*s/sqrt(N) = 5.37465
# Plot the sample data, its mean and confidence interval.
i := 0 .. N - 1
range[i] := i
upper[i] := u
data_mean[i] := m.s
lower[i] := l
# [plot: data, upper, data_mean, lower vs range]
# Use function pt to calculate the cumulative probability distribution for the confidence interval:
pt(1 - α, ν) = 0.826019
# Use function rt to create a vector of random numbers having a Student's t-distribution:
rt(7, ν) = [0.846744; 0.683414; -1.65155; 0.00602095; -0.824677; -0.931666; 0.270752]
# Example: Hypothesis Test of a Normal Mean
X := [
    2.323; 1.988; 3.476; -1.186; 2.425; 2.334; 0.758; 0.25; 3.052; 1.209
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]
n := length(X) = 50
mean(2) = 2
m_s := mean(X) = 1.61676
α := 0.1
μ := 2
σ := 1.5
# Calculate the Z score.
z := (m_s - μ)/(σ/sqrt(n)) = -1.80661
# Two-Tailed Test
# State the null and the alternative hypothesis for a two-tailed test.
# H0: m = μ
# H1: m ≠ μ
# Use function pnorm to test the hypothesis in terms of p-values for the two-tailed test. In this example, all of the Boolean expressions evaluate to 1 when the null hypothesis is true (you do not reject H0).
(α/2 < pnorm(z, 0, 1)) and (pnorm(z, 0, 1) < 1 - α/2) = 0
# Use function qnorm to test the hypothesis in terms of q-values for the two-tailed test.
z_t := qnorm(1 - α/2, 0, 1) = 1.64485
|z| < z_t = 0
# Reject the null hypothesis. There is evidence that the mean is significantly different from μ.
# Use function dnorm to calculate the standard normal distribution
normal(q) := dnorm(q, 0, 1)
# [plot: normal(q) vs q]
# Left-Tailed Test
# 1.State the null and the alternative hypothesis for a left-tailed test.
# H0: m >= μ
# H1: m < μ
# 2.Use function pnorm to test the hypothesis in terms of p-values for the left-tailed test.
pnorm(z, 0, 1) > α = 0
# Use function qnorm to test the hypothesis in terms of q-values for the left-tailed test.
z_L := qnorm(α, 0, 1) = -1.28155
z > z_L = 0
# Reject the null hypothesis. There is evidence that the mean is smaller than μ.
# Right-Tailed Test
# 1.State the null and the alternative hypothesis for a right-tailed test.
# H0: m <= μ
# H1: m > μ
# 2.Use the pnorm function to test the hypothesis in terms of p-values for the right-tailed test:
pnorm(z, 0, 1) < 1 - α = 1
z_R := qnorm(1 - α, 0, 1) = 1.28155
z < z_R = 1
# Accept the null hypothesis. There is no evidence that the mean is greater than μ.
# Example: Variance and Standard Deviation
points := 2000
i := 0 .. points
WeibDist := rweibull(points, 2)*kg
NormDist := rnorm(points, .87, .5)*kg
WeibHist := histogram(15, WeibDist)
NormHist := histogram(15, NormDist)
# [plot: NormHist[:, 1], WeibHist[:, 1] vs NormHist[:, 0] (kg), WeibHist[:, 0] (kg)]
mean(WeibDist) = 0.872957 kg
mean(NormDist) = 0.866818 kg
# Calculate the sample variance of the distributions.
Var(WeibDist) = 0.209961 kg^2
Var(NormDist) = 0.252381 kg^2
Variance(V) := 1/(rows(V) - 1)*sum((V[i] - mean(V))^2, i = 0 .. rows(V) - 1)
Variance(WeibDist) = 0.209961 kg^2
# Calculate the sample standard deviation of the Weibull distribution.
Stdev(WeibDist) = 0.458215 kg
sqrt(Var(WeibDist)) = 0.458215 kg
# Calculate the population variance and standard deviations for the Weibull distribution:
var(WeibDist) = 0.209856 kg^2
stdev(WeibDist) = 0.4581 kg
variance(V) := 1/rows(V)*sum((V[i] - mean(V))^2, i = 0 .. rows(V) - 1)
variance(WeibDist) = 0.209856 kg^2
# Example: Computing Standard Errors
D := [
    10.23; 10.12; 9.841; 10.28; 9.35; 10.03; 9.734; 9.325; 7.16; 12.01
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]
N := length(D) = 36
SE_mean := sqrt(N/(N - 1)*var(D)) = 1.7072
# Standard Error of a Proportion
Dp := [
    0; 1; 0; 0; 0; 0; 1; 0; 0; 1
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]
Np := rows(Dp) = 100
p := sum(Dp)/Np = 0.33
SE_pr := sqrt(p*(1 - p)/Np) = 0.0470213
# Standard Error of a Regression
Dr := [
    0.006, 3;
    1.967, 4.437;
    4.925, 6.156;
    4.752, 7.886;
    8.114, 9.017;
    5.871, 11.48;
    9.552, 10.14;
    8.52, 11.25;
    8.457, 14.66;
    9.737, 12.88
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]
X := Dr[:, 0] = [
    0.006; 1.967; 4.925; 4.752; 8.114; 5.871; 9.552; 8.52; 8.457; 9.737
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]
Y := Dr[:, 1] = [
    3; 4.437; 6.156; 7.886; 9.017; 11.48; 10.14; 11.25; 14.66; 12.88
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]
m := slope(X, Y) = 1.42547
b := intercept(X, Y) = 1.48161
# Calculate the standard error of the slope.
Nr := rows(Dr) = 100
SE_slope := sqrt(sum((Y[i - 1] - (m*X[i - 1] + b))^2, i = 1 .. Nr)/((Nr - 2)*Nr*var(X))) = 0.0577807
# Calculate the standard error of the intercept.
SE_intercept := 1/Nr*sqrt(sum((Y[i - 1] - (m*X[i - 1] + b))^2, i = 1 .. Nr)*sum(X[i - 1]^2, i = 1 .. Nr)/var(X)) = 34.0669
# Example: Kurtosis and Skewness
points := 2000
i := 0 .. points
WD := rweibull(points, 2)*kg
ND := rnorm(points, 0.87, 0.5)*kg
WH := histogram(15, WD/kg)
NH := histogram(15, ND/kg)
# [plot: WH[:, 1], NH[:, 1] vs WH[:, 0], NH[:, 0]]
# Compare the peak of the distributions by calculating the kurtosis of the distributions.
kurt(WD) = 0.0605237
kurt(ND) = -0.0451831
# The bins of the histogram account for the slight deviation of the kurtosis of the normal distribution from zero. The kurtosis of the Weibull distribution indicates that it is slightly peaked compared to a normal distribution.
# Population kurtosis can be estimated by the following sample kurtosis coefficient:
kurtosis(v) := rows(v)*(rows(v) + 1)*sum((v - mean(v))^4)/((rows(v) - 1)*(rows(v) - 2)*(rows(v) - 3)*Stdev(v)^4) - 3*(rows(v) - 1)^2/((rows(v) - 2)*(rows(v) - 3))
kurtosis(WD/kg) = 0.0605237
# Compare the skew of the distributions.
skew(WD) = 0.566147
skew(ND) = -0.0352843
# Example: F-Test
cer := [
    1, 1, 1, 608.781, -1, -1, -1;
    2, 1, 2, 569.67, -1, -1, -1;
    3, 1, 1, 689.556, -1, -1, -1;
    4, 1, 2, 747.541, -1, -1, -1;
    5, 1, 1, 618.134, -1, -1, -1;
    6, 1, 2, 612.182, -1, -1, -1;
    7, 1, 1, 680.203, -1, -1, -1;
    8, 1, 2, 607.766, -1, -1, -1;
    9, 1, 1, 726.232, -1, -1, -1;
    10, 1, 2, 605.38, -1, -1, -1
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]
Batch := submatrix(cer, 1, rows(cer) - 1, 2, 3)
i := 1 .. rows(cer)
batch1 := vlookup(1, Batch, 1)
batch2 := vlookup(2, Batch, 1)
range[i] := i
# [plot: batch1, batch2 vs range]
f := Var(batch1)/Var(batch2) = 1.12066
Ftest(batch1, batch2) = [1.12066; 0.379615]
# Example: Covariance and Correlation Coefficient
DATA := [
    1, 0.1, 0.4;
    2, -0.86, 0.72;
    3, -1.075, 1.1;
    4, -1.16, 1.45;
    5, -1.53, 1.8;
    6, -2.72, 2.17;
    7, -2.64, 2.4;
    8, -2.91, 2.8;
    9, -3.58, 3.2;
    10, -3.7, 3.4
]
V_1 := DATA[:, 1]
V_2 := DATA[:, 2]
a := slope(V_1, V_2)
b := intercept(V_1, V_2)
y(x) := a*x + b
# [plot: V_2, y(V_1) vs V_1]
cvar(V_1, V_2) = -1.15943
cvar(V_1, V_2)/var(V_1) = -0.792303
a = -0.792303
# Pearson's Correlation Coefficient
r := corr(V_1, V_2) = -0.980848
N := rows(DATA)
i := 0 .. N - 1
1/N*sum(((V_1[i] - mean(V_1))/stdev(V_1))*((V_2[i] - mean(V_2))/stdev(V_2)), i = 0 .. N - 1) = -0.980848
r^2 = 0.962063
# Spearman Rank Correlation
Rank1 := Rank(V_1) = [10; 9; 8; 7; 6; 4; 5; 3; 2; 1]
Rank2 := Rank(V_2) = [1; 2; 3; 4; 5; 6; 7; 8; 9; 10]
corr(Rank1, Rank2) = -0.987879
corr(V_1, V_2) = -0.980848
# Example: Correlation and Contingency Tables
Meds := [0; 150; 300; 200; 400; 0; 350; 150; 0; 0; 500; 0; 0; 250]
Resp := [1; 0; 0; -1; 0; 1; 1; 0; 0; 0; 1; -1; 1; 0]
Spear(Meds, Resp) = [388; -0.0951279; 0.924213; 0.0263837; 0.928661]
kendltau(Meds, Resp) = [0.0300658; 0.149782; 0.880937]
# Functions: kendltau2 and contingtbl
# When there are only a few possible values for each variable, you can record the data as a contingency table, with the frequency of responses as entries.
Table := [0, 2, 13, 4; 2, 5, 7, 10; 3, 2, 1, 0]
kendltau2(Table) = [-0.232663; -2.35848; 0.0183497]
c := contingtbl(Table) = [21.2183; 6; 0.00167603; 0.46531; 0.549706]
