# trigonometric functions
θ := 34 deg = 0.593412
A := sin(θ) = 0.559193
D := cos(2*θ) = 0.374607
B := tan(θ) = 0.674509
C := cot(θ) = 1.48256
atan(B) = 34 deg
acot(C) = 0.593412
asin(A) = 0.593412
acos(D) = 68 deg
E := sec(θ) = 1.20622
F := csc(θ) = 1.78829
asec(E) = 0.593412
acsc(F) = 0.593412
atan2(2, 1) = 26.5651 deg
angle(3, 1) = 18.4349 deg
sinc(θ) = 0.942335
sin(θ)/θ = 0.942335
acot(-2) = 2.67795
atan(-6) = -1.40565
